# OpenSim document version 40000
Model LondonLowerLimbModel1.0:
  gravity: 0 -9.80665 0
  length_units: meters
  force_units: N
  credits:
    Modenese Luca, Imperial College London Structural Biomechanics Group http://www.imperial.ac.uk/structuralbiomechanics
  publications:
    Details and references of the London Lower Limb Model (see also pdf included in the release): 1) Muscle attachments, joint kinematics (patella included) and muscle contraction parameters are based on the anatomical dataset published by Klein Horsman M. D., Koopman H. F. J. M. et al., "Morphological muscle and joint parameters for musculoskeletal modelling of the lower extremity", Clin Biomech, 22:239-247, 2007. 2) The ISB anatomical coordinate systems are adopted in the model. Wu G., Siegler S. et al. "ISB recommendation on definitions of joint coordinate system of various joints for the reporting of human joint motion--part I: ankle, hip, and spine." J Biomech 35:543-548, 2002. 3) In the original dataset the insertion of the muscle Adductor magnus (dist) is located in the tibia. This is anatomically not correct (Gray, H, "Anatomy of the Human Body". Philadelphia: Lea and Febiger, 1918;) and the insertion was moved to the femur. 4) In the original dataset the rest position of the foot is rotated externally in an unnatural way. A rest position coincident with the ISB reference position was hence adopted for the foot. Because of this choice, the talocrural joint axis in the foot results slightly different from the original one, while the axis on the tibia is unchanged. It is possible to use the original joint by modifying the orientation of the segment "Hind_Foot" with the values available in the comment to the talocrural joint. 5) A cylindrical wrapping surface representing the anterior femural condyles was introduced in the model to match experimental measurement of quadriceps moment arm (see Buford, W. L., Jr., Ivey, F. M. Jr. et al, "Muscle balance at the knee--moment arms for the normal knee and the ACL-minus knee", IEEE Trans Rehabil Eng, 5:367-379, 1997). The bundles of the quadriceps are affected for knee flexion angles higher then about 90 degrees. 6) Joint range of motion was limited using the values published in Boone, D. C. and Azen, S. P. "Normal range of motion of joints in male subjects", J Bone Joint Surg Am 61:756-759, 1979.
  Ground
  BodySet:
    Body Pelvis: mass=3.18 [kg] mass_center=(0.014 0.054 0.0005) inertia=(0.012 0.017 0.012 0 0 0)
        meshes=(Hors_pelvis_r.obj Hors_pelvis_l.obj Hors_sacrum.obj)
      WrapCylinder WrapPelvis_R: xyz_body_rotation=(-0.143687 -0.211575 -0.6981) translation=(-0.0127 0.0097 0.0722)
          quadrant=x radius=0.0399 length=0.2
    Body Femur_r: mass=11.54 mass_center=(0.010112 -0.159559 -0.015013) inertia=(0.197 0.058 0.197 0 0 0)
        meshes=Hors_femur_r.obj
      WrapCylinder WrapFemur_R: xyz_body_rotation=(-0.0635214 0.0977677 1.618)
          translation=(-0.00735672 -0.406046 -0.0285596) quadrant=Y radius=0.0246 length=0.15
      WrapCylinder WrapFemur2_R: xyz_body_rotation=(-0.0635214 0.0977677 1.618)
          translation=(-0.0111737 -0.386715 0.0148761) quadrant=-Y radius=0.0246 length=0.15
    Body Patella_r: mass=1e-7 mass_center=(0 0 0) inertia=(1e-7 1e-7 1e-7 0 0 0) meshes=Hors_patella_r.obj
    Body Tibia_r: mass=4 mass_center=(0.002994 0.22273 -0.072495) inertia=(0.058 0.007 0.058 0 0 0)
        meshes=(Hors_tibia_r.obj Hors_fibula_r.obj)
    Body Hind_Foot_r: mass=1.3 mass_center=(0.0997098 0.00452056 -0.00072954) inertia=(0.001 0.005 0.005 0 0 0)
        meshes=Hors_talus_r.obj
    Body Mid_Foot_r: mass=1e-7 mass_center=(0 0 0) inertia=(1e-7 1e-7 1e-7 0 0 0) meshes=Hors_foot_r.obj
    Body Phal_r: mass=0 mass_center=(0 0 0) inertia=(0 0 0 0 0 0) meshes=Hors_bofoot_r.obj
  JointSet:
    CustomJoint ground_pelvis: socket_parent_frame=ground_offset socket_child_frame=Pelvis_offset
      Coordinate pelvis_tilt: default_value=0 range=(-3.14 3.14)
      Coordinate pelvis_list: default_value=0 range=(-3.14 3.14)
      Coordinate pelvis_rotation: default_value=0 range=(-3.14 3.14)
      Coordinate pelvis_tx: default_value=0 range=(-5 5)
      Coordinate pelvis_ty: default_value=0 range=(-1.5 2)
      Coordinate pelvis_tz: default_value=0 range=(-3 3)
      PhysicalOffsetFrame ground_offset: socket_parent=/ground translation=(0 0 0) [meters]
      PhysicalOffsetFrame Pelvis_offset: socket_parent=/bodyset/Pelvis translation=(0 0 0)
      SpatialTransform:
        TransformAxis rotation1: coordinates=pelvis_tilt axis=(0 0 1) LinearFunction(coefficients=1 0)
        TransformAxis rotation2: coordinates=pelvis_list axis=(1 0 0) LinearFunction(coefficients=1 0)
        TransformAxis rotation3: coordinates=pelvis_rotation axis=(0 1 0) LinearFunction(coefficients=1 0)
        TransformAxis translation1: coordinates=pelvis_tx axis=(1 0 0) LinearFunction(coefficients=1 0)
        TransformAxis translation2: coordinates=pelvis_ty axis=(0 1 0) LinearFunction(coefficients=1 0)
        TransformAxis translation3: coordinates=pelvis_tz axis=(0 0 1) LinearFunction(coefficients=1 0)
    CustomJoint hip_r: socket_parent_frame=Pelvis_offset socket_child_frame=Femur_r_offset
      Coordinate hip_flexion_r: default_value=0 range=(-0.2111848 2.117084)
      Coordinate hip_adduction_r: default_value=0 range=(-0.7068583 0.4468043)
      Coordinate hip_rotation_r: default_value=0 range=(-0.7714355 0.7749262)
      PhysicalOffsetFrame Pelvis_offset: socket_parent=/bodyset/Pelvis translation=(0 0 0.0897)
      PhysicalOffsetFrame Femur_r_offset: socket_parent=/bodyset/Femur_r translation=(0 0 0)
      SpatialTransform: axes_held_at_zero=(translation1 translation2 translation3)
        TransformAxis rotation1: coordinates=hip_flexion_r axis=(0 0 1) LinearFunction(coefficients=1 0)
        TransformAxis rotation2: coordinates=hip_adduction_r axis=(1 0 0) LinearFunction(coefficients=1 0)
        TransformAxis rotation3: coordinates=hip_rotation_r axis=(0 1 0) LinearFunction(coefficients=1 0)
    CustomJoint patello_femoral_r: socket_parent_frame=Femur_r_offset socket_child_frame=Patella_r_offset
      Coordinate patella_rotation_r: default_value=0 range=(-3 3) clamped=true
      PhysicalOffsetFrame Femur_r_offset: socket_parent=/bodyset/Femur_r translation=(-0.0111737 -0.386715 0.0148761)
      PhysicalOffsetFrame Patella_r_offset: socket_parent=/bodyset/Patella_r translation=(-0.0642 -0.0258 0.0139)
      SpatialTransform: axes_held_at_zero=(rotation2 rotation3 translation1 translation2 translation3)
        TransformAxis rotation1: coordinates=patella_rotation_r axis=(-0.01126692 0.05745084 0.9982848)
            LinearFunction(coefficients=1 0)
    CustomJoint knee_r: socket_parent_frame=Femur_r_offset socket_child_frame=Tibia_r_offset
      Coordinate knee_angle_r: default_value=0 range=(-2.460914 0.02617994) clamped=true
      PhysicalOffsetFrame Femur_r_offset: socket_parent=/bodyset/Femur_r translation=(-0.013593 -0.409499 0.00956)
      PhysicalOffsetFrame Tibia_r_offset: socket_parent=/bodyset/Tibia_r translation=(-0.007574 0.387801 -0.0913)
          orientation=(-0.218123 0.6351 0.0336583) [radians]
      SpatialTransform: axes_held_at_zero=(rotation2 rotation3 translation1 translation2 translation3)
        TransformAxis rotation1: coordinates=knee_angle_r axis=(-0.1039731 -0.06154294 0.9919688)
            LinearFunction(coefficients=1 0)
    CustomJoint Talocrural_r: socket_parent_frame=Tibia_r_offset socket_child_frame=Hind_Foot_r_offset
      Coordinate ankle_angle_r: default_value=0 range=(-0.9477138 0.4363) clamped=true
      PhysicalOffsetFrame Tibia_r_offset: socket_parent=/bodyset/Tibia_r
          translation=(0.00913874 -0.0131919 -0.00809682) orientation=(-0.263635 0.555583 0)
      PhysicalOffsetFrame Hind_Foot_r_offset: socket_parent=/bodyset/Hind_Foot_r
          translation=(0.0534357 0.05422 -0.0234838)
      SpatialTransform: axes_held_at_zero=(rotation2 rotation3 translation1 translation2 translation3)
        TransformAxis rotation1: coordinates=ankle_angle_r axis=(-0.2969459 -0.1848146 0.9365718)
            LinearFunction(coefficients=1 0)
    CustomJoint Subtalar_r: socket_parent_frame=Hind_Foot_r_offset socket_child_frame=Mid_Foot_r_offset
      Coordinate subtalar_angle_r: default_value=0 range=(-0.6318 0.3351) clamped=true
      PhysicalOffsetFrame Hind_Foot_r_offset: socket_parent=/bodyset/Hind_Foot_r translation=(0.0598 0.061 -0.038)
      PhysicalOffsetFrame Mid_Foot_r_offset: socket_parent=/bodyset/Mid_Foot_r translation=(0.0598 0.061 -0.038)
      SpatialTransform: axes_held_at_zero=(rotation2 rotation3 translation1 translation2 translation3)
        TransformAxis rotation1: coordinates=subtalar_angle_r axis=(-0.5701958 -0.6769711 0.4645125)
            LinearFunction(coefficients=1 0)
    WeldJoint toes: socket_parent_frame=Mid_Foot_r_offset socket_child_frame=Phal_r_offset
      PhysicalOffsetFrame Mid_Foot_r_offset: socket_parent=/bodyset/Mid_Foot_r translation=(0 0 0)
      PhysicalOffsetFrame Phal_r_offset: socket_parent=/bodyset/Phal_r translation=(0 0 0)
  ConstraintSet:
    CoordinateCouplerConstraint patella_planar_path: independent_coordinate_names=knee_angle_r
        dependent_coordinate_name=patella_rotation_r
      coupled_coordinates_function: SimmSpline: x=(-2.44346 -2.42601 -2.40855 -2.3911 -2.37365 -2.35619 -2.33874 -2.32129 -2.30383 -2.28638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)
          y=(-2.28196 -2.26451 -2.24706 -2.2296 -2.21215 -2.1947 -2.17724 -2.15979 -2.14234 -2.12488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)
  ForceSet:
    Thelen2003Muscle ADD_BREV_PROS_1_R: max_isometric_force=70.3 optimal_fiber_length=0.095 tendon_slack_length=0
        pennation_angle_at_optimal=0 [radians]
      PathPoint default: Pelvis (0.0462 -0.013 0.0205)
      PathPoint default_0: Femur_r (-0.019165 -0.080652 0.027447)
    Thelen2003Muscle ADD_BREV_PROS_2_R: max_isometric_force=70.3 optimal_fiber_length=0.095 tendon_slack_length=0
        pennation_angle_at_optimal=0
      PathPoint default: Pelvis (0.0507 -0.0132 0.0185)
      PathPoint default_0: Femur_r (-0.015544 -0.09308 0.026464)
    Thelen2003Muscle ADD_BREV_MID_1_R: max_isometric_force=64.75 optimal_fiber_length=0.104 tendon_slack_length=0
        pennation_angle_at_optimal=0
      PathPoint default: Pelvis (0.0457 -0.0182 0.0136)
      PathPoint default_0: Femur_r (-0.01367 -0.10577 0.025907)
    Thelen2003Muscle ADD_BREV_MID_2_R: max_isometric_force=64.75 optimal_fiber_length=0.104 tendon_slack_length=0
        pennation_angle_at_optimal=0
      PathPoint default: Pelvis (0.0493 -0.0184 0.0119)
      PathPoint default_0: Femur_r (-0.012781 -0.11873 0.025277)
    Thelen2003Muscle ADD_BREV_DIST_1_R: max_isometric_force=59.2 optimal_fiber_length=0.112 tendon_slack_length=0
        pennation_angle_at_optimal=0
      PathPoint default: Pelvis (0.0386 -0.0257 0.0063)
      PathPoint default_0: Femur_r (-0.01206 -0.13158 0.024064)
    Thelen2003Muscle ADD_BREV_DIST_2_R: max_isometric_force=59.2 optimal_fiber_length=0.112 tendon_slack_length=0
        pennation_angle_at_optimal=0
      PathPoint default: Pelvis (0.0409 -0.0258 0.0052)
      PathPoint default_0: Femur_r (-0.010524 -0.14439 0.021769)
    Thelen2003Muscle ADD_LONG_1_R: max_isometric_force=93.1167 optimal_fiber_length=0.106 tendon_slack_length=0
        pennation_angle_at_optimal=0
      PathPoint default: Pelvis (0.0525 -0.0092 0.0233)
      PathPoint default_0: Femur_r (-0.0018052 -0.17529 0.014273)
    Thelen2003Muscle ADD_LONG_2_R: max_isometric_force=93.1167 optimal_fiber_length=0.106 tendon_slack_length=0
        pennation_angle_at_optimal=0
      PathPoint default: Pelvis (0.0544 -0.0116 0.0208)
      PathPoint default_0: Femur_r (-0.0014579 -0.18754 0.011923)
    Thelen2003Muscle ADD_LONG_3_R: max_isometric_force=93.1167 optimal_fiber_length=0.106 tendon_slack_length=0
        pennation_angle_at_optimal=0
      PathPoint default: Pelvis (0.0557 -0.0137 0.0178)
      PathPoint default_0: Femur_r (-0.0005999 -0.20003 0.010203)
    Thelen2003Muscle ADD_LONG_4_R: max_isometric_force=93.1167 optimal_fiber_length=0.106 tendon_slack_length=0
        pennation_angle_at_optimal=0
      PathPoint default: Pelvis (0.0563 -0.0156 0.0146)
      PathPoint default_0: Femur_r (0.00046839 -0.21264 0.0087101)
    Thelen2003Muscle ADD_LONG_5_R: max_isometric_force=93.1167 optimal_fiber_length=0.106 tendon_slack_length=0
        pennation_angle_at_optimal=0
      PathPoint default: Pelvis (0.0561 -0.0173 0.0112)
      PathPoint default_0: Femur_r (0.001148 -0.22511 0.0068573)
    Thelen2003Muscle ADD_LONG_6_R: max_isometric_force=93.1167 optimal_fiber_length=0.106 tendon_slack_length=0
        pennation_angle_at_optimal=0
      PathPoint default: Pelvis (0.055 -0.0188 0.0077)
      PathPoint default_0: Femur_r (0.001082 -0.23741 0.0043779)
    Thelen2003Muscle ADD_MAG_DIST_1_R: max_isometric_force=326.8333 optimal_fiber_length=0.108
        tendon_slack_length=0.042 pennation_angle_at_optimal=0
      PathPoint default: Pelvis (-0.021 -0.071 0.0412)
      PathPoint default_0: Femur_r (-0.0092978 -0.36656 -0.035201)
    Thelen2003Muscle ADD_MAG_DIST_2_R: max_isometric_force=326.8333 optimal_fiber_length=0.108
        tendon_slack_length=0.042 pennation_angle_at_optimal=0
      PathPoint default: Pelvis (-0.0151 -0.0671 0.034)
      PathPoint default_0: Femur_r (-0.0092978 -0.36656 -0.035201)
    Thelen2003Muscle ADD_MAG_DIST_3_R: max_isometric_force=326.8333 optimal_fiber_length=0.108
        tendon_slack_length=0.042 pennation_angle_at_optimal=0
      PathPoint default: Pelvis (0.0021 -0.0578 0.0194)
      PathPoint default_0: Femur_r (-0.0092978 -0.36656 -0.035201)
    Thelen2003Muscle ADD_MAG_MID_1_R: max_isometric_force=136.2833 optimal_fiber_length=0.104 tendon_slack_length=0
        pennation_angle_at_optimal=0
      PathPoint default: Pelvis (-0.0279 -0.069 0.0403)
      PathPoint default_0: Femur_r (-0.0037261 -0.20017 0.011665)
    Thelen2003Muscle ADD_MAG_MID_2_R: max_isometric_force=136.2833 optimal_fiber_length=0.104 tendon_slack_length=0
        pennation_angle_at_optimal=0
      PathPoint default: Pelvis (-0.025 -0.0668 0.0444)
      PathPoint default_0: Femur_r (-0.0037261 -0.20017 0.011665)
    Thelen2003Muscle ADD_MAG_MID_3_R: max_isometric_force=136.2833 optimal_fiber_length=0.104 tendon_slack_length=0
        pennation_angle_at_optimal=0
      PathPoint default: Pelvis (-0.0212 -0.066 0.0344)
      PathPoint default_0: Femur_r (-0.0024503 -0.23176 0.0051048)
    Thelen2003Muscle ADD_MAG_MID_4_R: max_isometric_force=136.2833 optimal_fiber_length=0.104 tendon_slack_length=0
        pennation_angle_at_optimal=0
      PathPoint default: Pelvis (-0.0187 -0.0642 0.0379)
      PathPoint default_0: Femur_r (-0.0024503 -0.23176 0.0051048)
    Thelen2003Muscle ADD_MAG_MID_5_R: max_isometric_force=136.2833 optimal_fiber_length=0.104 tendon_slack_length=0
        pennation_angle_at_optimal=0
      PathPoint default: Pelvis (-0.0125 -0.0621 0.0273)
      PathPoint default_0: Femur_r (-0.00024188 -0.26356 0.0019894)
    Thelen2003Muscle ADD_MAG_MID_6_R: max_isometric_force=136.2833 optimal_fiber_length=0.104 tendon_slack_length=0
        pennation_angle_at_optimal=0
      PathPoint default: Pelvis (-0.0106 -0.0607 0.0299)
      PathPoint default_0: Femur_r (-0.00024188 -0.26356 0.0019894)
    Thelen2003Muscle ADD_MAG_PROX_1_R: max_isometric_force=46.25 optimal_fiber_length=0.107 tendon_slack_length=0
        pennation_angle_at_optimal=0
      PathPoint default: Pelvis (0.0186 -0.045 0.0123)
      PathPoint default_0: Femur_r (-0.0069565 -0.10696 0.017436)
    Thelen2003Muscle ADD_MAG_PROX_2_R: max_isometric_force=46.25 optimal_fiber_length=0.107 tendon_slack_length=0
        pennation_angle_at_optimal=0
      PathPoint default: Pelvis (0.0039 -0.0533 0.0221)
      PathPoint default_0: Femur_r (-0.005116 -0.12766 0.015637)
    Thelen2003Muscle ADD_MAG_PROX_3_R: max_isometric_force=46.25 optimal_fiber_length=0.107 tendon_slack_length=0
        pennation_angle_at_optimal=0
      PathPoint default: Pelvis (0.0113 -0.0492 0.0172)
      PathPoint default_0: Femur_r (-0.0032887 -0.14846 0.013841)
    Thelen2003Muscle ADD_MAG_PROX_4_R: max_isometric_force=46.25 optimal_fiber_length=0.107 tendon_slack_length=0
        pennation_angle_at_optimal=0
      PathPoint default: Pelvis (0.0186 -0.045 0.0123)
      PathPoint default_0: Femur_r (-0.0015365 -0.16915 0.012087)
    Thelen2003Muscle BIC_FEM_CL_1_R: max_isometric_force=1006.4 optimal_fiber_length=0.085 tendon_slack_length=0.13
        pennation_angle_at_optimal=0.52185
      PathPoint default: Pelvis (-0.0378 -0.0609 0.0726)
      PathPoint default_0: Tibia_r (0.0089334 0.35544 -0.045168)
    Thelen2003Muscle BIC_FEM_CB_1_R: max_isometric_force=145.5333 optimal_fiber_length=0.091 tendon_slack_length=0.031
        pennation_angle_at_optimal=0
      PathPoint default: Femur_r (-0.012392 -0.19296 0.020077)
      PathPoint default_0: Tibia_r (0.0089334 0.35544 -0.045168)
    Thelen2003Muscle BIC_FEM_CB_2_R: max_isometric_force=145.5333 optimal_fiber_length=0.091 tendon_slack_length=0.031
        pennation_angle_at_optimal=0
      PathPoint default: Femur_r (-0.0093703 -0.23886 0.0123)
      PathPoint default_0: Tibia_r (0.0089334 0.35544 -0.045168)
    Thelen2003Muscle BIC_FEM_CB_3_R: max_isometric_force=145.5333 optimal_fiber_length=0.091 tendon_slack_length=0.031
        pennation_angle_at_optimal=0
      PathPoint default: Femur_r (-0.0068661 -0.28785 0.012422)
      PathPoint default_0: Tibia_r (0.0089334 0.35544 -0.045168)
    Thelen2003Muscle EXT_DIG_LONG_1_R: max_isometric_force=66.6 optimal_fiber_length=0.06 tendon_slack_length=0.301
        pennation_angle_at_optimal=0.14486
      PathPoint default: Tibia_r (0.001398 0.29286 -0.037586)
      PathPoint default_0: Tibia_r (0.022727 0.042492 0.0025848)
      PathPoint default_1: Tibia_r (0.023876 0.031516 0.0046392)
      PathPoint default_2: Tibia_r (0.025412 0.019967 0.0082813)
      PathPoint default_3: Tibia_r (0.025163 0.0082483 0.011038)
      PathPoint default_4: Mid_Foot_r (0.083414 0.06092 0.006175)
      PathPoint default_5: Phal_r (0.22001 0.017508 0.019876)
    Thelen2003Muscle EXT_DIG_LONG_2_R: max_isometric_force=66.6 optimal_fiber_length=0.06 tendon_slack_length=0.301
        pennation_angle_at_optimal=0.14486
      PathPoint default: Tibia_r (0.012246 0.33038 -0.049737)
      PathPoint default_0: Tibia_r (0.022727 0.042492 0.0025848)
      PathPoint default_1: Tibia_r (0.023876 0.031516 0.0046392)
      PathPoint default_2: Tibia_r (0.025412 0.019967 0.0082813)
      PathPoint default_3: Tibia_r (0.025163 0.0082483 0.011038)
      PathPoint default_4: Mid_Foot_r (0.083414 0.06092 0.006175)
      PathPoint default_5: Phal_r (0.22001 0.017508 0.019876)
    Thelen2003Muscle EXT_DIG_LONG_3_R: max_isometric_force=66.6 optimal_fiber_length=0.06 tendon_slack_length=0.301
        pennation_angle_at_optimal=0.14486
      PathPoint default: Tibia_r (0.021991 0.35389 -0.058551)
      PathPoint default_0: Tibia_r (0.022727 0.042492 0.0025848)
      PathPoint default_1: Tibia_r (0.023876 0.031516 0.0046392)
      PathPoint default_2: Tibia_r (0.025412 0.019967 0.0082813)
      PathPoint default_3: Tibia_r (0.025163 0.0082483 0.011038)
      PathPoint default_4: Mid_Foot_r (0.083414 0.06092 0.006175)
      PathPoint default_5: Phal_r (0.22001 0.017508 0.019876)
    Thelen2003Muscle EXT_HAL_LONG_1_R: max_isometric_force=75.2333 optimal_fiber_length=0.06 tendon_slack_length=0.178
        pennation_angle_at_optimal=0.25133
      PathPoint default: Tibia_r (-0.0024558 0.14455 -0.0073818)
      PathPoint default_0: Tibia_r (0.024572 0.06236 -0.013994)
      PathPoint default_1: Tibia_r (0.026093 0.042228 -0.010928)
      PathPoint default_2: Tibia_r (0.027359 0.032484 -0.011607)
      PathPoint default_3: Tibia_r (0.028567 0.021789 -0.011985)
      PathPoint default_4: Tibia_r (0.028939 0.012632 -0.010974)
      PathPoint default_5: Tibia_r (0.028708 0.0081514 -0.011906)
      PathPoint default_6: Mid_Foot_r (0.11331 0.053955 -0.020129)
      PathPoint default_7: Mid_Foot_r (0.12451 0.048207 -0.023935)
      PathPoint default_8: Mid_Foot_r (0.13674 0.041179 -0.028279)
      PathPoint default_9: Mid_Foot_r (0.15199 0.031399 -0.031443)
      PathPoint default_10: Mid_Foot_r (0.15981 0.026399 -0.034228)
      PathPoint default_11: Mid_Foot_r (0.17195 0.020461 -0.035778)
      PathPoint default_12: Mid_Foot_r (0.17802 0.018889 -0.0371)
      PathPoint default_13: Phal_r (0.22253 0.020185 -0.035038)
    Thelen2003Muscle EXT_HAL_LONG_2_R: max_isometric_force=75.2333 optimal_fiber_length=0.06 tendon_slack_length=0.178
        pennation_angle_at_optimal=0.25133
      PathPoint default: Tibia_r (-0.0041814 0.19794 -0.018918)
      PathPoint default_0: Tibia_r (0.024572 0.06236 -0.013994)
      PathPoint default_1: Tibia_r (0.026093 0.042228 -0.010928)
      PathPoint default_2: Tibia_r (0.027359 0.032484 -0.011607)
      PathPoint default_3: Tibia_r (0.028567 0.021789 -0.011985)
      PathPoint default_4: Tibia_r (0.028939 0.012632 -0.010974)
      PathPoint default_5: Tibia_r (0.028708 0.0081514 -0.011906)
      PathPoint default_6: Mid_Foot_r (0.11331 0.053955 -0.020129)
      PathPoint default_7: Mid_Foot_r (0.12451 0.048207 -0.023935)
      PathPoint default_8: Mid_Foot_r (0.13674 0.041179 -0.028279)
      PathPoint default_9: Mid_Foot_r (0.15199 0.031399 -0.031443)
      PathPoint default_10: Mid_Foot_r (0.15981 0.026399 -0.034228)
      PathPoint default_11: Mid_Foot_r (0.17195 0.020461 -0.035778)
      PathPoint default_12: Mid_Foot_r (0.17802 0.018889 -0.0371)
      PathPoint default_13: Phal_r (0.22253 0.020185 -0.035038)
    Thelen2003Muscle EXT_HAL_LONG_3_R: max_isometric_force=75.2333 optimal_fiber_length=0.06 tendon_slack_length=0.178
        pennation_angle_at_optimal=0.25133
      PathPoint default: Tibia_r (-0.0016256 0.25204 -0.029735)
      PathPoint default_0: Tibia_r (0.024572 0.06236 -0.013994)
      PathPoint default_1: Tibia_r (0.026093 0.042228 -0.010928)
      PathPoint default_2: Tibia_r (0.027359 0.032484 -0.011607)
      PathPoint default_3: Tibia_r (0.028567 0.021789 -0.011985)
      PathPoint default_4: Tibia_r (0.028939 0.012632 -0.010974)
      PathPoint default_5: Tibia_r (0.028708 0.0081514 -0.011906)
      PathPoint default_6: Mid_Foot_r (0.11331 0.053955 -0.020129)
      PathPoint default_7: Mid_Foot_r (0.12451 0.048207 -0.023935)
      PathPoint default_8: Mid_Foot_r (0.13674 0.041179 -0.028279)
      PathPoint default_9: Mid_Foot_r (0.15199 0.031399 -0.031443)
      PathPoint default_10: Mid_Foot_r (0.15981 0.026399 -0.034228)
      PathPoint default_11: Mid_Foot_r (0.17195 0.020461 -0.035778)
      PathPoint default_12: Mid_Foot_r (0.17802 0.018889 -0.0371)
      PathPoint default_13: Phal_r (0.22253 0.020185 -0.035038)
    Thelen2003Muscle FLEX_DIG_LONG_1_R: max_isometric_force=81.4 optimal_fiber_length=0.038 tendon_slack_length=0.166
        pennation_angle_at_optimal=0.49742
      PathPoint default: Tibia_r (-0.0094086 0.24536 -0.073073)
      PathPoint default_0: Tibia_r (-0.016079 0.024254 -0.012792)
      PathPoint default_1: Tibia_r (-0.014539 0.010688 -0.015548)
      PathPoint default_2: Tibia_r (-0.014885 0.0043032 -0.01588)
      PathPoint default_3: Tibia_r (-0.015678 -0.0024607 -0.017499)
      PathPoint default_4: Tibia_r (-0.013287 -0.0083106 -0.018935)
      PathPoint default_5: Tibia_r (-0.013245 -0.015941 -0.019812)
      PathPoint default_6: Tibia_r (-0.0089286 -0.034586 -0.018151)
      PathPoint default_7: Tibia_r (-0.0069863 -0.03947 -0.01661)
      PathPoint default_8: Phal_r (0.22058 0.0082703 0.016378)
    Thelen2003Muscle FLEX_DIG_LONG_2_R: max_isometric_force=81.4 optimal_fiber_length=0.038 tendon_slack_length=0.166
        pennation_angle_at_optimal=0.49742
      PathPoint default: Tibia_r (-0.0080029 0.19296 -0.063116)
      PathPoint default_0: Tibia_r (-0.016079 0.024254 -0.012792)
      PathPoint default_1: Tibia_r (-0.014539 0.010688 -0.015548)
      PathPoint default_2: Tibia_r (-0.014885 0.0043032 -0.01588)
      PathPoint default_3: Tibia_r (-0.015678 -0.0024607 -0.017499)
      PathPoint default_4: Tibia_r (-0.013287 -0.0083106 -0.018935)
      PathPoint default_5: Tibia_r (-0.013245 -0.015941 -0.019812)
      PathPoint default_6: Tibia_r (-0.0089286 -0.034586 -0.018151)
      PathPoint default_7: Tibia_r (-0.0069863 -0.03947 -0.01661)
      PathPoint default_8: Phal_r (0.22058 0.0082703 0.016378)
    Thelen2003Muscle FLEX_DIG_LONG_3_R: max_isometric_force=81.4 optimal_fiber_length=0.038 tendon_slack_length=0.166
        pennation_angle_at_optimal=0.49742
      PathPoint default: Tibia_r (-0.008411 0.15393 -0.050719)
      PathPoint default_0: Tibia_r (-0.016079 0.024254 -0.012792)
      PathPoint default_1: Tibia_r (-0.014539 0.010688 -0.015548)
      PathPoint default_2: Tibia_r (-0.014885 0.0043032 -0.01588)
      PathPoint default_3: Tibia_r (-0.015678 -0.0024607 -0.017499)
      PathPoint default_4: Tibia_r (-0.013287 -0.0083106 -0.018935)
      PathPoint default_5: Tibia_r (-0.013245 -0.015941 -0.019812)
      PathPoint default_6: Tibia_r (-0.0089286 -0.034586 -0.018151)
      PathPoint default_7: Tibia_r (-0.0069863 -0.03947 -0.01661)
      PathPoint default_8: Phal_r (0.22058 0.0082703 0.016378)
    Thelen2003Muscle FLEX_HAL_LONG_1_R: max_isometric_force=383.5667 optimal_fiber_length=0.026
        tendon_slack_length=0.234 pennation_angle_at_optimal=0.52534
      PathPoint default: Tibia_r (-0.012204 0.22422 -0.017737)
      PathPoint default_0: Tibia_r (-0.022195 0.014055 -0.0030159)
      PathPoint default_1: Tibia_r (-0.021374 0.0039328 -0.0049821)
      PathPoint default_2: Tibia_r (-0.021158 -0.00084167 -0.006759)
      PathPoint default_3: Tibia_r (-0.021331 -0.0043704 -0.0079911)
      PathPoint default_4: Tibia_r (-0.021834 -0.0057013 -0.0089786)
      PathPoint default_5: Tibia_r (-0.022179 -0.012759 -0.011443)
      PathPoint default_6: Tibia_r (-0.019185 -0.023957 -0.013068)
      PathPoint default_7: Tibia_r (-0.016579 -0.033909 -0.014149)
      PathPoint default_8: Phal_r (0.23346 0.010246 -0.032347)
    Thelen2003Muscle FLEX_HAL_LONG_2_R: max_isometric_force=383.5667 optimal_fiber_length=0.026
        tendon_slack_length=0.234 pennation_angle_at_optimal=0.52534
      PathPoint default: Tibia_r (-0.011948 0.17104 -0.0084723)
      PathPoint default_0: Tibia_r (-0.022195 0.014055 -0.0030159)
      PathPoint default_1: Tibia_r (-0.021374 0.0039328 -0.0049821)
      PathPoint default_2: Tibia_r (-0.021158 -0.00084167 -0.006759)
      PathPoint default_3: Tibia_r (-0.021331 -0.0043704 -0.0079911)
      PathPoint default_4: Tibia_r (-0.021834 -0.0057013 -0.0089786)
      PathPoint default_5: Tibia_r (-0.022179 -0.012759 -0.011443)
      PathPoint default_6: Tibia_r (-0.019185 -0.023957 -0.013068)
      PathPoint default_7: Tibia_r (-0.016579 -0.033909 -0.014149)
      PathPoint default_8: Phal_r (0.23346 0.010246 -0.032347)
    Thelen2003Muscle FLEX_HAL_LONG_3_R: max_isometric_force=383.5667 optimal_fiber_length=0.026
        tendon_slack_length=0.234 pennation_angle_at_optimal=0.52534
      PathPoint default: Tibia_r (-0.011596 0.11654 0.0013008)
      PathPoint default_0: Tibia_r (-0.022195 0.014055 -0.0030159)
      PathPoint default_1: Tibia_r (-0.021374 0.0039328 -0.0049821)
      PathPoint default_2: Tibia_r (-0.021158 -0.00084167 -0.006759)
      PathPoint default_3: Tibia_r (-0.021331 -0.0043704 -0.0079911)
      PathPoint default_4: Tibia_r (-0.021834 -0.0057013 -0.0089786)
      PathPoint default_5: Tibia_r (-0.022179 -0.012759 -0.011443)
      PathPoint default_6: Tibia_r (-0.019185 -0.023957 -0.013068)
      PathPoint default_7: Tibia_r (-0.016579 -0.033909 -0.014149)
      PathPoint default_8: Phal_r (0.23346 0.010246 -0.032347)
    Thelen2003Muscle GASTR_LAT_1_R: max_isometric_force=888 optimal_fiber_length=0.057 tendon_slack_length=0.234
        pennation_angle_at_optimal=0.44331
      PathPoint default: Femur_r (-0.0094821 -0.37917 0.017732)
      PathPoint default_0: Hind_Foot_r (-0.0022439 0.0025115 0.0069962)
      PathWrap: wrap_object=WrapFemur_R
    Thelen2003Muscle GASTR_MED_1_R: max_isometric_force=1620.6 optimal_fiber_length=0.06 tendon_slack_length=0.212
        pennation_angle_at_optimal=0.1885
      PathPoint default: Femur_r (-0.010523 -0.36999 -0.02281)
      PathPoint default_0: Hind_Foot_r (-0.0026069 -0.0059098 0.0042212)
      PathWrap: wrap_object=WrapFemur_R
    Thelen2003Muscle GEM_INF_1_R: max_isometric_force=151.7 optimal_fiber_length=0.034 tendon_slack_length=0
        pennation_angle_at_optimal=0
      PathPoint default: Pelvis (-0.065 -0.0405 0.0611)
      PathPoint default_0: Femur_r (-0.0084802 0.0094775 0.052544)
    Thelen2003Muscle GEM_SUP_1_R: max_isometric_force=151.7 optimal_fiber_length=0.034 tendon_slack_length=0
        pennation_angle_at_optimal=0
      PathPoint default: Pelvis (-0.0556 0.0086 0.0395)
      PathPoint default_0: Femur_r (-0.002027 0.00059482 0.042732)
    Thelen2003Muscle GLUT_MAX_SUP_1_R: max_isometric_force=306.4833 optimal_fiber_length=0.12 tendon_slack_length=0
        pennation_angle_at_optimal=0
      PathPoint default: Pelvis (-0.0791 0.0777 0.074)
      PathPoint default_0: Femur_r (0.0054948 0.059785 0.082806)
    Thelen2003Muscle GLUT_MAX_SUP_2_R: max_isometric_force=306.4833 optimal_fiber_length=0.12 tendon_slack_length=0
        pennation_angle_at_optimal=0
      PathPoint default: Pelvis (-0.0898 0.0551 0.0551)
      PathPoint default_0: Femur_r (0.00028349 0.029658 0.087524)
    Thelen2003Muscle GLUT_MAX_SUP_3_R: max_isometric_force=306.4833 optimal_fiber_length=0.12 tendon_slack_length=0
        pennation_angle_at_optimal=0
      PathPoint default: Pelvis (-0.0964 0.0273 0.0396)
      PathPoint default_0: Femur_r (-0.0063424 -0.0002634 0.092738)
    Thelen2003Muscle GLUT_MAX_SUP_4_R: max_isometric_force=306.4833 optimal_fiber_length=0.12 tendon_slack_length=0
        pennation_angle_at_optimal=0
      PathPoint default: Pelvis (-0.0913 0.0891 0.0629)
      PathPoint default_0: Femur_r (0.020863 0.055043 0.077923)
    Thelen2003Muscle GLUT_MAX_SUP_5_R: max_isometric_force=306.4833 optimal_fiber_length=0.12 tendon_slack_length=0
        pennation_angle_at_optimal=0
      PathPoint default: Pelvis (-0.1033 0.0677 0.0428)
      PathPoint default_0: Femur_r (0.016301 0.02472 0.082419)
    Thelen2003Muscle GLUT_MAX_SUP_6_R: max_isometric_force=306.4833 optimal_fiber_length=0.12 tendon_slack_length=0
        pennation_angle_at_optimal=0
      PathPoint default: Pelvis (-0.1094 0.0394 0.0278)
      PathPoint default_0: Femur_r (0.0090255 -0.005006 0.087856)
    Thelen2003Muscle GLUT_MAX_INF_1_R: max_isometric_force=138.75 optimal_fiber_length=0.151 tendon_slack_length=0
        pennation_angle_at_optimal=0
      PathPoint default: Pelvis (-0.1074 -0.0083 0.0145)
      PathPoint default_0: Femur_r (-0.040627 -0.064568 0.064114)
    Thelen2003Muscle GLUT_MAX_INF_2_R: max_isometric_force=138.75 optimal_fiber_length=0.151 tendon_slack_length=0
        pennation_angle_at_optimal=0
      PathPoint default: Pelvis (-0.0987 -0.0149 0.0166)
      PathPoint default_0: Femur_r (-0.039027 -0.078178 0.059295)
    Thelen2003Muscle GLUT_MAX_INF_3_R: max_isometric_force=138.75 optimal_fiber_length=0.151 tendon_slack_length=0
        pennation_angle_at_optimal=0
      PathPoint default: Pelvis (-0.0905 -0.0256 0.0162)
      PathPoint default_0: Femur_r (-0.031287 -0.10284 0.050471)
    Thelen2003Muscle GLUT_MAX_INF_4_R: max_isometric_force=138.75 optimal_fiber_length=0.151 tendon_slack_length=0
        pennation_angle_at_optimal=0
      PathPoint default: Pelvis (-0.1025 -0.0016 0.0211)
      PathPoint default_0: Femur_r (-0.040627 -0.064568 0.064114)
    Thelen2003Muscle GLUT_MAX_INF_5_R: max_isometric_force=138.75 optimal_fiber_length=0.151 tendon_slack_length=0
        pennation_angle_at_optimal=0
      PathPoint default: Pelvis (-0.0938 -0.0082 0.0232)
      PathPoint default_0: Femur_r (-0.039027 -0.078178 0.059295)
    Thelen2003Muscle GLUT_MAX_INF_6_R: max_isometric_force=138.75 optimal_fiber_length=0.151 tendon_slack_length=0
        pennation_angle_at_optimal=0
      PathPoint default: Pelvis (-0.0865 -0.02 0.0217)
      PathPoint default_0: Femur_r (-0.031287 -0.10284 0.050471)
    Thelen2003Muscle GLUT_MED_ANT_1_R: max_isometric_force=233.7167 optimal_fiber_length=0.038 tendon_slack_length=0
        pennation_angle_at_optimal=0
      PathPoint default: Pelvis (0.004 0.0948 0.1343)
      PathPoint default_0: Femur_r (-0.00049888 -7.0611e-5 0.066371)
    Thelen2003Muscle GLUT_MED_ANT_2_R: max_isometric_force=233.7167 optimal_fiber_length=0.038 tendon_slack_length=0
        pennation_angle_at_optimal=0
      PathPoint default: Pelvis (0.0143 0.0903 0.1353)
      PathPoint default_0: Femur_r (0.0074447 -0.0030755 0.065516)
    Thelen2003Muscle GLUT_MED_ANT_3_R: max_isometric_force=233.7167 optimal_fiber_length=0.038 tendon_slack_length=0
        pennation_angle_at_optimal=0
      PathPoint default: Pelvis (0.0249 0.0819 0.1323)
      PathPoint default_0: Femur_r (0.014707 -0.005092 0.064364)
    Thelen2003Muscle GLUT_MED_ANT_4_R: max_isometric_force=233.7167 optimal_fiber_length=0.038 tendon_slack_length=0
        pennation_angle_at_optimal=0
      PathPoint default: Pelvis (0.0093 0.0995 0.1419)
      PathPoint default_0: Femur_r (-0.0031674 -0.0080347 0.070832)
    Thelen2003Muscle GLUT_MED_ANT_5_R: max_isometric_force=233.7167 optimal_fiber_length=0.038 tendon_slack_length=0
        pennation_angle_at_optimal=0
      PathPoint default: Pelvis (0.018 0.0936 0.1406)
      PathPoint default_0: Femur_r (0.0039188 -0.013105 0.07113)
    Thelen2003Muscle GLUT_MED_ANT_6_R: max_isometric_force=233.7167 optimal_fiber_length=0.038 tendon_slack_length=0
        pennation_angle_at_optimal=0
      PathPoint default: Pelvis (0.0281 0.0847 0.1369)
      PathPoint default_0: Femur_r (0.011181 -0.015121 0.069978)
    Thelen2003Muscle GLUT_MED_POST_1_R: max_isometric_force=374.9333 optimal_fiber_length=0.045
        tendon_slack_length=0.03 pennation_angle_at_optimal=0.27751
      PathPoint default: Pelvis (-0.0388 0.1187 0.1148)
      PathPoint default_0: Femur_r (-0.012559 0.012609 0.057166)
    Thelen2003Muscle GLUT_MED_POST_2_R: max_isometric_force=374.9333 optimal_fiber_length=0.045
        tendon_slack_length=0.03 pennation_angle_at_optimal=0.27751
      PathPoint default: Pelvis (-0.0602 0.1015 0.0856)
      PathPoint default_0: Femur_r (-0.016386 0.012772 0.053164)
    Thelen2003Muscle GLUT_MED_POST_3_R: max_isometric_force=374.9333 optimal_fiber_length=0.045
        tendon_slack_length=0.03 pennation_angle_at_optimal=0.27751
      PathPoint default: Pelvis (-0.0682 0.0721 0.0666)
      PathPoint default_0: Femur_r (-0.020126 0.012186 0.051112)
    Thelen2003Muscle GLUT_MED_POST_4_R: max_isometric_force=374.9333 optimal_fiber_length=0.045
        tendon_slack_length=0.03 pennation_angle_at_optimal=0.27751
      PathPoint default: Pelvis (-0.0481 0.1346 0.1104)
      PathPoint default_0: Femur_r (-0.012559 0.012609 0.057166)
    Thelen2003Muscle GLUT_MED_POST_5_R: max_isometric_force=374.9333 optimal_fiber_length=0.045
        tendon_slack_length=0.03 pennation_angle_at_optimal=0.27751
      PathPoint default: Pelvis (-0.0734 0.1241 0.0794)
      PathPoint default_0: Femur_r (-0.018311 0.0085917 0.061739)
    Thelen2003Muscle GLUT_MED_POST_6_R: max_isometric_force=374.9333 optimal_fiber_length=0.045
        tendon_slack_length=0.03 pennation_angle_at_optimal=0.27751
      PathPoint default: Pelvis (-0.0841 0.0993 0.0591)
      PathPoint default_0: Femur_r (-0.022131 0.0077268 0.060055)
    Thelen2003Muscle GLUT_MIN_ANT_1_R: max_isometric_force=370 optimal_fiber_length=0.028 tendon_slack_length=0.073
        pennation_angle_at_optimal=0
      PathPoint default: Pelvis (-0.0008 0.0789 0.1228)
      PathPoint default_0: Femur_r (0.011521 -0.022198 0.062525)
    Thelen2003Muscle GLUT_MIN_MID_1_R: max_isometric_force=299.7 optimal_fiber_length=0.034 tendon_slack_length=0.073
        pennation_angle_at_optimal=0
      PathPoint default: Pelvis (-0.0226 0.0755 0.107)
      PathPoint default_0: Femur_r (0.011521 -0.022198 0.062525)
    Thelen2003Muscle GLUT_MIN_POST_1_R: max_isometric_force=273.8 optimal_fiber_length=0.037 tendon_slack_length=0.073
        pennation_angle_at_optimal=0
      PathPoint default: Pelvis (-0.0403 0.0651 0.0904)
      PathPoint default_0: Femur_r (0.011521 -0.022198 0.062525)
    Thelen2003Muscle GRACILIS_1_R: max_isometric_force=90.65 optimal_fiber_length=0.181 tendon_slack_length=0.14
        pennation_angle_at_optimal=0
      PathPoint default: Pelvis (0.0165 -0.0488 0.0158)
      PathPoint default_0: Tibia_r (-0.041175 0.34691 -0.11688)
      PathPoint default_1: Tibia_r (-0.034883 0.33921 -0.11679)
      PathPoint default_2: Tibia_r (-0.034436 0.33891 -0.11764)
      PathPoint default_3: Tibia_r (-0.029639 0.3358 -0.11993)
      PathPoint default_4: Tibia_r (-0.02329 0.32971 -0.11801)
      PathPoint default_5: Tibia_r (-0.022843 0.32942 -0.11886)
      PathPoint default_6: Tibia_r (-0.011079 0.32413 -0.11671)
      PathPoint default_7: Tibia_r (0.00035445 0.32103 -0.11432)
      PathPoint default_8: Tibia_r (-0.0045077 0.30526 -0.10668)
    Thelen2003Muscle GRACILIS_2_R: max_isometric_force=90.65 optimal_fiber_length=0.181 tendon_slack_length=0.14
        pennation_angle_at_optimal=0
      PathPoint default: Pelvis (0.0367 -0.0346 0.0099)
      PathPoint default_0: Tibia_r (-0.041175 0.34691 -0.11688)
      PathPoint default_1: Tibia_r (-0.034883 0.33921 -0.11679)
      PathPoint default_2: Tibia_r (-0.034436 0.33891 -0.11764)
      PathPoint default_3: Tibia_r (-0.029639 0.3358 -0.11993)
      PathPoint default_4: Tibia_r (-0.02329 0.32971 -0.11801)
      PathPoint default_5: Tibia_r (-0.022843 0.32942 -0.11886)
      PathPoint default_6: Tibia_r (-0.011079 0.32413 -0.11671)
      PathPoint default_7: Tibia_r (0.00035445 0.32103 -0.11432)
      PathPoint default_8: Tibia_r (-0.0045077 0.30526 -0.10668)
    Thelen2003Muscle ILIACUS_LAT_1_R: max_isometric_force=81.4 optimal_fiber_length=0.103 tendon_slack_length=0.113
        pennation_angle_at_optimal=0.46251
      PathPoint default: Pelvis (-0.0295 0.1323 0.1172)
      PathPoint default_0: Pelvis (0.023 0.032 0.0787)
      PathPoint default_1: Femur_r (-0.025738 -0.047698 0.015656)
      PathWrap: wrap_object=WrapPelvis_R
    Thelen2003Muscle ILIACUS_LAT_2_R: max_isometric_force=81.4 optimal_fiber_length=0.103 tendon_slack_length=0.113
        pennation_angle_at_optimal=0.46251
      PathPoint default: Pelvis (-0.0113 0.1148 0.1189)
      PathPoint default_0: Pelvis (0.023 0.032 0.0787)
      PathPoint default_1: Femur_r (-0.025738 -0.047698 0.015656)
      PathWrap: wrap_object=WrapPelvis_R
    Thelen2003Muscle ILIACUS_LAT_3_R: max_isometric_force=81.4 optimal_fiber_length=0.103 tendon_slack_length=0.113
        pennation_angle_at_optimal=0.46251
      PathPoint default: Pelvis (-0.0034 0.1001 0.1175)
      PathPoint default_0: Pelvis (0.023 0.032 0.0787)
      PathPoint default_1: Femur_r (-0.025738 -0.047698 0.015656)
      PathWrap: wrap_object=WrapPelvis_R
    Thelen2003Muscle ILIACUS_MID_1_R: max_isometric_force=160.3333 optimal_fiber_length=0.052 tendon_slack_length=0.113
        pennation_angle_at_optimal=0
      PathPoint default: Pelvis (-0.0558 0.1354 0.09)
      PathPoint default_0: Pelvis (0.023 0.032 0.0787)
      PathPoint default_1: Femur_r (-0.025738 -0.047698 0.015656)
      PathWrap: wrap_object=WrapPelvis_R
    Thelen2003Muscle ILIACUS_MID_2_R: max_isometric_force=160.3333 optimal_fiber_length=0.052 tendon_slack_length=0.113
        pennation_angle_at_optimal=0
      PathPoint default: Pelvis (-0.0432 0.1103 0.0876)
      PathPoint default_0: Pelvis (0.023 0.032 0.0787)
      PathPoint default_1: Femur_r (-0.025738 -0.047698 0.015656)
      PathWrap: wrap_object=WrapPelvis_R
    Thelen2003Muscle ILIACUS_MID_3_R: max_isometric_force=160.3333 optimal_fiber_length=0.052 tendon_slack_length=0.113
        pennation_angle_at_optimal=0
      PathPoint default: Pelvis (-0.0308 0.0861 0.0859)
      PathPoint default_0: Pelvis (0.023 0.032 0.0787)
      PathPoint default_1: Femur_r (-0.025738 -0.047698 0.015656)
      PathWrap: wrap_object=WrapPelvis_R
    Thelen2003Muscle ILIACUS_MED_1_R: max_isometric_force=93.7333 optimal_fiber_length=0.089 tendon_slack_length=0.155
        pennation_angle_at_optimal=0
      PathPoint default: Pelvis (-0.0527 0.1275 0.0507)
      PathPoint default_0: Pelvis (0.023 0.032 0.0787)
      PathPoint default_1: Femur_r (-0.025738 -0.047698 0.015656)
      PathWrap: wrap_object=WrapPelvis_R
    Thelen2003Muscle ILIACUS_MED_2_R: max_isometric_force=93.7333 optimal_fiber_length=0.089 tendon_slack_length=0.155
        pennation_angle_at_optimal=0
      PathPoint default: Pelvis (-0.0467 0.1077 0.0546)
      PathPoint default_0: Pelvis (0.023 0.032 0.0787)
      PathPoint default_1: Femur_r (-0.025738 -0.047698 0.015656)
      PathWrap: wrap_object=WrapPelvis_R
    Thelen2003Muscle ILIACUS_MED_3_R: max_isometric_force=93.7333 optimal_fiber_length=0.089 tendon_slack_length=0.155
        pennation_angle_at_optimal=0
      PathPoint default: Pelvis (-0.0368 0.0813 0.0536)
      PathPoint default_0: Pelvis (0.023 0.032 0.0787)
      PathPoint default_1: Femur_r (-0.025738 -0.047698 0.015656)
      PathWrap: wrap_object=WrapPelvis_R
    Thelen2003Muscle OBT_EXT_INF_1_R: max_isometric_force=101.75 optimal_fiber_length=0.069 tendon_slack_length=0.035
        pennation_angle_at_optimal=0
      PathPoint default: Pelvis (-0.0004 -0.0483 0.0222)
      PathPoint default_0: Femur_r (-0.03455 -0.049641 0.046942)
    Thelen2003Muscle OBT_EXT_INF_2_R: max_isometric_force=101.75 optimal_fiber_length=0.069 tendon_slack_length=0.035
        pennation_angle_at_optimal=0
      PathPoint default: Pelvis (0.0189 -0.0395 0.0099)
      PathPoint default_0: Femur_r (-0.03455 -0.049641 0.046942)
    Thelen2003Muscle OBT_EXT_SUP_1_R: max_isometric_force=303.4 optimal_fiber_length=0.028 tendon_slack_length=0.03
        pennation_angle_at_optimal=0
      PathPoint default: Pelvis (0.0388 -0.0177 0.0095)
      PathPoint default_0: Femur_r (-0.014005 -0.030988 0.01283)
      PathPoint default_1: Femur_r (-0.017303 -0.0082741 0.037169)
    Thelen2003Muscle OBT_EXT_SUP_2_R: max_isometric_force=303.4 optimal_fiber_length=0.028 tendon_slack_length=0.03
        pennation_angle_at_optimal=0
      PathPoint default: Pelvis (0.0211 -0.0326 0.0125)
      PathPoint default_0: Femur_r (-0.014005 -0.030988 0.01283)
      PathPoint default_1: Femur_r (-0.017303 -0.0082741 0.037169)
    Thelen2003Muscle OBT_EXT_SUP_3_R: max_isometric_force=303.4 optimal_fiber_length=0.028 tendon_slack_length=0.03
        pennation_angle_at_optimal=0
      PathPoint default: Pelvis (-0.0004 -0.0433 0.021)
      PathPoint default_0: Femur_r (-0.014005 -0.030988 0.01283)
      PathPoint default_1: Femur_r (-0.017303 -0.0082741 0.037169)
    Thelen2003Muscle OBT_INT_1_R: max_isometric_force=313.2667 optimal_fiber_length=0.021 tendon_slack_length=0.082
        pennation_angle_at_optimal=0
      PathPoint default: Pelvis (-0.0222 0.0219 0.0478)
      PathPoint default_0: Pelvis (-0.057 -0.025 0.0467)
      PathPoint default_1: Femur_r (-0.0052977 0.0050428 0.04766)
    Thelen2003Muscle OBT_INT_2_R: max_isometric_force=313.2667 optimal_fiber_length=0.021 tendon_slack_length=0.082
        pennation_angle_at_optimal=0
      PathPoint default: Pelvis (-0.0198 0.0035 0.0405)
      PathPoint default_0: Pelvis (-0.057 -0.025 0.0467)
      PathPoint default_1: Femur_r (-0.0052977 0.0050428 0.04766)
    Thelen2003Muscle OBT_INT_3_R: max_isometric_force=313.2667 optimal_fiber_length=0.021 tendon_slack_length=0.082
        pennation_angle_at_optimal=0
      PathPoint default: Pelvis (-0.0093 -0.0128 0.0307)
      PathPoint default_0: Pelvis (-0.057 -0.025 0.0467)
      PathPoint default_1: Femur_r (-0.0052977 0.0050428 0.04766)
    Thelen2003Muscle PECTINEUS_1_R: max_isometric_force=62.9 optimal_fiber_length=0.115 tendon_slack_length=0
        pennation_angle_at_optimal=0
      PathPoint default: Pelvis (0.0347 0.0138 0.0384)
      PathPoint default_0: Femur_r (-0.019054 -0.073991 0.025021)
    Thelen2003Muscle PECTINEUS_2_R: max_isometric_force=62.9 optimal_fiber_length=0.115 tendon_slack_length=0
        pennation_angle_at_optimal=0
      PathPoint default: Pelvis (0.0397 0.0103 0.0349)
      PathPoint default_0: Femur_r (-0.018742 -0.082826 0.0247)
    Thelen2003Muscle PECTINEUS_3_R: max_isometric_force=62.9 optimal_fiber_length=0.115 tendon_slack_length=0
        pennation_angle_at_optimal=0
      PathPoint default: Pelvis (0.0447 0.0067 0.0314)
      PathPoint default_0: Femur_r (-0.01843 -0.091661 0.024379)
    Thelen2003Muscle PECTINEUS_4_R: max_isometric_force=62.9 optimal_fiber_length=0.115 tendon_slack_length=0
        pennation_angle_at_optimal=0
      PathPoint default: Pelvis (0.0497 0.0032 0.0279)
      PathPoint default_0: Femur_r (-0.019054 -0.073991 0.025021)
    Thelen2003Muscle PERONEUS_BREV_1_R: max_isometric_force=234.3333 optimal_fiber_length=0.027
        tendon_slack_length=0.064 pennation_angle_at_optimal=0.40317
      PathPoint default: Tibia_r (-0.0066762 0.20514 -0.012561)
      PathPoint default_0: Tibia_r (-0.012841 0.043444 0.01539)
      PathPoint default_1: Tibia_r (-0.012372 0.028954 0.01949)
      PathPoint default_2: Tibia_r (-0.011298 0.0091156 0.023401)
      PathPoint default_3: Tibia_r (-0.0083627 -0.0023618 0.024208)
      PathPoint default_4: Mid_Foot_r (0.095866 0.017466 0.037295)
    Thelen2003Muscle PERONEUS_BREV_2_R: max_isometric_force=234.3333 optimal_fiber_length=0.027
        tendon_slack_length=0.064 pennation_angle_at_optimal=0.40317
      PathPoint default: Tibia_r (-0.007724 0.15901 -0.003833)
      PathPoint default_0: Tibia_r (-0.012841 0.043444 0.01539)
      PathPoint default_1: Tibia_r (-0.012372 0.028954 0.01949)
      PathPoint default_2: Tibia_r (-0.011298 0.0091156 0.023401)
      PathPoint default_3: Tibia_r (-0.0083627 -0.0023618 0.024208)
      PathPoint default_4: Mid_Foot_r (0.095866 0.017466 0.037295)
    Thelen2003Muscle PERONEUS_BREV_3_R: max_isometric_force=234.3333 optimal_fiber_length=0.027
        tendon_slack_length=0.064 pennation_angle_at_optimal=0.40317
      PathPoint default: Tibia_r (-0.0080984 0.11429 0.0041694)
      PathPoint default_0: Tibia_r (-0.012841 0.043444 0.01539)
      PathPoint default_1: Tibia_r (-0.012372 0.028954 0.01949)
      PathPoint default_2: Tibia_r (-0.011298 0.0091156 0.023401)
      PathPoint default_3: Tibia_r (-0.0083627 -0.0023618 0.024208)
      PathPoint default_4: Mid_Foot_r (0.095866 0.017466 0.037295)
    Thelen2003Muscle PERONEUS_LONG_1_R: max_isometric_force=294.7667 optimal_fiber_length=0.034
        tendon_slack_length=0.159 pennation_angle_at_optimal=0.27576
      PathPoint default: Tibia_r (0.0020645 0.3183 -0.036371)
      PathPoint default_0: Tibia_r (-0.012841 0.043444 0.01539)
      PathPoint default_1: Tibia_r (-0.012372 0.028954 0.01949)
      PathPoint default_2: Tibia_r (-0.011298 0.0091156 0.023401)
      PathPoint default_3: Tibia_r (-0.0083627 -0.0023618 0.024208)
      PathPoint default_4: Mid_Foot_r (0.077953 0.027643 0.026748)
    Thelen2003Muscle PERONEUS_LONG_2_R: max_isometric_force=294.7667 optimal_fiber_length=0.034
        tendon_slack_length=0.159 pennation_angle_at_optimal=0.27576
      PathPoint default: Tibia_r (-0.0022011 0.28172 -0.028638)
      PathPoint default_0: Tibia_r (-0.012841 0.043444 0.01539)
      PathPoint default_1: Tibia_r (-0.012372 0.028954 0.01949)
      PathPoint default_2: Tibia_r (-0.011298 0.0091156 0.023401)
      PathPoint default_3: Tibia_r (-0.0083627 -0.0023618 0.024208)
      PathPoint default_4: Mid_Foot_r (0.077953 0.027643 0.026748)
    Thelen2003Muscle PERONEUS_LONG_3_R: max_isometric_force=294.7667 optimal_fiber_length=0.034
        tendon_slack_length=0.159 pennation_angle_at_optimal=0.27576
      PathPoint default: Tibia_r (-0.0061309 0.24545 -0.02119)
      PathPoint default_0: Tibia_r (-0.012841 0.043444 0.01539)
      PathPoint default_1: Tibia_r (-0.012372 0.028954 0.01949)
      PathPoint default_2: Tibia_r (-0.011298 0.0091156 0.023401)
      PathPoint default_3: Tibia_r (-0.0083627 -0.0023618 0.024208)
      PathPoint default_4: Mid_Foot_r (0.077953 0.027643 0.026748)
    Thelen2003Muscle PERONEUS_TERT_1_R: max_isometric_force=76.4667 optimal_fiber_length=0.043 tendon_slack_length=0.1
        pennation_angle_at_optimal=0.33336
      PathPoint default: Tibia_r (-0.0021568 0.12323 -0.002303)
      PathPoint default_0: Tibia_r (0.021369 0.035462 0.0066759)
      PathPoint default_1: Tibia_r (0.023567 0.019517 0.0098287)
      PathPoint default_2: Tibia_r (0.026818 -0.002741 0.0098149)
      PathPoint default_3: Mid_Foot_r (0.14239 0.013268 0.032515)
    Thelen2003Muscle PERONEUS_TERT_2_R: max_isometric_force=76.4667 optimal_fiber_length=0.043 tendon_slack_length=0.1
        pennation_angle_at_optimal=0.33336
      PathPoint default: Tibia_r (-0.0026225 0.17407 -0.012048)
      PathPoint default_0: Tibia_r (0.021369 0.035462 0.0066759)
      PathPoint default_1: Tibia_r (0.023567 0.019517 0.0098287)
      PathPoint default_2: Tibia_r (0.026818 -0.002741 0.0098149)
      PathPoint default_3: Mid_Foot_r (0.14239 0.013268 0.032515)
    Thelen2003Muscle PERONEUS_TERT_3_R: max_isometric_force=76.4667 optimal_fiber_length=0.043 tendon_slack_length=0.1
        pennation_angle_at_optimal=0.33336
      PathPoint default: Tibia_r (-0.0023228 0.22464 -0.022832)
      PathPoint default_0: Tibia_r (0.021369 0.035462 0.0066759)
      PathPoint default_1: Tibia_r (0.023567 0.019517 0.0098287)
      PathPoint default_2: Tibia_r (0.026818 -0.002741 0.0098149)
      PathPoint default_3: Mid_Foot_r (0.14239 0.013268 0.032515)
    Thelen2003Muscle PIRIFORME_1_R: max_isometric_force=299.7 optimal_fiber_length=0.039 tendon_slack_length=0.016
        pennation_angle_at_optimal=0
      PathPoint default: Pelvis (-0.1007 0.0231 0.0155)
      PathPoint default_0: Femur_r (-0.017222 0.012604 0.039797)
    Thelen2003Muscle PLANTARIS_1_R: max_isometric_force=88.8 optimal_fiber_length=0.048 tendon_slack_length=0.35
        pennation_angle_at_optimal=0
      PathPoint default: Femur_r (-0.0090376 -0.38711 0.034294)
      PathPoint default_0: Hind_Foot_r (0.0037122 0.0027372 -0.009603)
    Thelen2003Muscle POPLITEUS_1_R: max_isometric_force=197.95 optimal_fiber_length=0.024 tendon_slack_length=0.01
        pennation_angle_at_optimal=0
      PathPoint default: Femur_r (-0.0096482 -0.41157 0.042357)
      PathPoint default_0: Tibia_r (-0.0072365 0.35395 -0.064684)
      PathPoint default_1: Tibia_r (-0.012028 0.28096 -0.084581)
    Thelen2003Muscle POPLITEUS_2_R: max_isometric_force=197.95 optimal_fiber_length=0.024 tendon_slack_length=0.01
        pennation_angle_at_optimal=0
      PathPoint default: Femur_r (-0.0096482 -0.41157 0.042357)
      PathPoint default_0: Tibia_r (-0.0072365 0.35395 -0.064684)
      PathPoint default_1: Tibia_r (-0.019478 0.32343 -0.087895)
    Thelen2003Muscle PSOAS_MIN_1_R: max_isometric_force=40.7 optimal_fiber_length=0.059 tendon_slack_length=0.152
        pennation_angle_at_optimal=0
      PathPoint default: Pelvis (-0.0506 0.2528 0.0336)
      PathPoint default_0: Femur_r (0.0080766 -0.019634 -0.013656)
    Thelen2003Muscle PSOAS_MAJ_1_R: max_isometric_force=240.5 optimal_fiber_length=0.099 tendon_slack_length=0.113
        pennation_angle_at_optimal=0.23387
      PathPoint default: Pelvis (-0.0574 0.2264 0.0341)
      PathPoint default_0: Pelvis (0.023 0.032 0.0787)
      PathPoint default_1: Femur_r (-0.025738 -0.047698 0.015656)
      PathWrap: wrap_object=WrapPelvis_R
    Thelen2003Muscle PSOAS_MAJ_2_R: max_isometric_force=240.5 optimal_fiber_length=0.099 tendon_slack_length=0.113
        pennation_angle_at_optimal=0.23387
      PathPoint default: Pelvis (-0.0291 0.1844 0.0301)
      PathPoint default_0: Pelvis (0.023 0.032 0.0787)
      PathPoint default_1: Femur_r (-0.025738 -0.047698 0.015656)
      PathWrap: wrap_object=WrapPelvis_R
    Thelen2003Muscle PSOAS_MAJ_3_R: max_isometric_force=240.5 optimal_fiber_length=0.099 tendon_slack_length=0.113
        pennation_angle_at_optimal=0.23387
      PathPoint default: Pelvis (-0.0281 0.142 0.0309)
      PathPoint default_0: Pelvis (0.023 0.032 0.0787)
      PathPoint default_1: Femur_r (-0.025738 -0.047698 0.015656)
      PathWrap: wrap_object=WrapPelvis_R
    Thelen2003Muscle QUAD_FEM_1_R: max_isometric_force=135.05 optimal_fiber_length=0.034 tendon_slack_length=0
        pennation_angle_at_optimal=0
      PathPoint default: Pelvis (-0.009 -0.0498 0.0267)
      PathPoint default_0: Femur_r (-0.031597 -0.018643 0.046866)
    Thelen2003Muscle QUAD_FEM_2_R: max_isometric_force=135.05 optimal_fiber_length=0.034 tendon_slack_length=0
        pennation_angle_at_optimal=0
      PathPoint default: Pelvis (-0.0154 -0.0524 0.0347)
      PathPoint default_0: Femur_r (-0.031926 -0.026552 0.047458)
    Thelen2003Muscle QUAD_FEM_3_R: max_isometric_force=135.05 optimal_fiber_length=0.034 tendon_slack_length=0
        pennation_angle_at_optimal=0
      PathPoint default: Pelvis (-0.0217 -0.055 0.0428)
      PathPoint default_0: Femur_r (-0.032167 -0.034475 0.048004)
    Thelen2003Muscle QUAD_FEM_4_R: max_isometric_force=135.05 optimal_fiber_length=0.034 tendon_slack_length=0
        pennation_angle_at_optimal=0
      PathPoint default: Pelvis (-0.028 -0.0576 0.0508)
      PathPoint default_0: Femur_r (-0.032407 -0.042398 0.048551)
    Thelen2003Muscle RECTUS_FEM_1_R: max_isometric_force=534.65 optimal_fiber_length=0.078 tendon_slack_length=0.096
        pennation_angle_at_optimal=0.38397
      PathPoint default: Pelvis (0.0302 0.0427 0.11)
      PathPoint default_0: Patella_r (0 0 0)
      PathWrap: wrap_object=WrapFemur2_R
    Thelen2003Muscle RECTUS_FEM_2_R: max_isometric_force=534.65 optimal_fiber_length=0.078 tendon_slack_length=0.096
        pennation_angle_at_optimal=0.38397
      PathPoint default: Pelvis (0.0302 0.0427 0.11)
      PathPoint default_0: Patella_r (-0.006 0.0003 0.01)
      PathWrap: wrap_object=WrapFemur2_R
    Thelen2003Muscle SARTORIUS_PROS_1_R: max_isometric_force=218.3 optimal_fiber_length=0.347 tendon_slack_length=0.079
        pennation_angle_at_optimal=0
      PathPoint default: Pelvis (0.032 0.0749 0.1247)
      PathPoint default_0: Femur_r (0.028405 -0.10782 -0.030033)
      PathPoint default_1: Femur_r (0.033643 -0.19407 -0.023041)
      PathPoint default_2: Femur_r (0.029641 -0.20373 -0.025803)
      PathPoint default_3: Femur_r (0.025412 -0.21845 -0.029731)
      PathPoint default_4: Femur_r (0.019061 -0.22881 -0.03245)
      PathPoint default_5: Femur_r (0.011564 -0.24101 -0.034648)
      PathPoint default_6: Femur_r (0.0059646 -0.25249 -0.037782)
      PathPoint default_7: Femur_r (0.0015851 -0.26505 -0.038204)
      PathPoint default_8: Femur_r (-0.0033767 -0.27857 -0.039482)
      PathPoint default_9: Femur_r (-0.0062537 -0.29337 -0.040732)
      PathPoint default_10: Femur_r (-0.0082477 -0.30831 -0.042433)
      PathPoint default_11: Femur_r (-0.011575 -0.32309 -0.044575)
      PathPoint default_12: Femur_r (-0.01197 -0.32606 -0.044468)
      PathPoint default_13: Tibia_r (-0.0021977 0.30883 -0.10954)
    Thelen2003Muscle SARTORIUS_DIST_1_R: max_isometric_force=218.3 optimal_fiber_length=0.347 tendon_slack_length=0.079
        pennation_angle_at_optimal=0
      PathPoint default: Pelvis (0.032 0.0749 0.1247)
      PathPoint default_0: Femur_r (-0.041568 -0.37235 -0.03769)
      PathPoint default_1: Tibia_r (-0.0021977 0.30883 -0.10954)
    Thelen2003Muscle SEMIMEMB_1_R: max_isometric_force=632.7 optimal_fiber_length=0.081 tendon_slack_length=0.157
        pennation_angle_at_optimal=0.43633
      PathPoint default: Pelvis (-0.028 -0.0661 0.0694)
      PathPoint default_0: Tibia_r (-0.046927 0.35414 -0.10374)
    Thelen2003Muscle SEMITEND_1_R: max_isometric_force=543.9 optimal_fiber_length=0.142 tendon_slack_length=0.237
        pennation_angle_at_optimal=0
      PathPoint default: Pelvis (-0.0403 -0.0607 0.0619)
      PathPoint default_0: Tibia_r (-0.051558 0.36102 -0.094139)
      PathPoint default_1: Tibia_r (-0.05107 0.35377 -0.093728)
      PathPoint default_2: Tibia_r (-0.046116 0.34559 -0.095369)
      PathPoint default_3: Tibia_r (-0.039881 0.33626 -0.097112)
      PathPoint default_4: Tibia_r (-0.034811 0.33 -0.099353)
      PathPoint default_5: Tibia_r (-0.031469 0.32518 -0.10065)
      PathPoint default_6: Tibia_r (-0.028245 0.31914 -0.099208)
      PathPoint default_7: Tibia_r (-0.011861 0.29547 -0.10149)
    Thelen2003Muscle SOLEUS_MED_1_R: max_isometric_force=1163.033 optimal_fiber_length=0.024 tendon_slack_length=0.085
        pennation_angle_at_optimal=1.1257
      PathPoint default: Tibia_r (-0.0057664 0.21128 -0.073862)
      PathPoint default_0: Hind_Foot_r (0.0022401 -0.0022888 -0.0069759)
    Thelen2003Muscle SOLEUS_MED_2_R: max_isometric_force=1163.033 optimal_fiber_length=0.024 tendon_slack_length=0.085
        pennation_angle_at_optimal=1.1257
      PathPoint default: Tibia_r (-0.0079648 0.24221 -0.0808)
      PathPoint default_0: Hind_Foot_r (0.0022401 -0.0022888 -0.0069759)
    Thelen2003Muscle SOLEUS_MED_3_R: max_isometric_force=1163.033 optimal_fiber_length=0.024 tendon_slack_length=0.085
        pennation_angle_at_optimal=1.1257
      PathPoint default: Tibia_r (-0.012401 0.26727 -0.083452)
      PathPoint default_0: Hind_Foot_r (0.0022401 -0.0022888 -0.0069759)
    Thelen2003Muscle SOLEUS_LAT_1_R: max_isometric_force=1059.433 optimal_fiber_length=0.026 tendon_slack_length=0.085
        pennation_angle_at_optimal=1.0245
      PathPoint default: Tibia_r (-0.011784 0.26516 -0.027364)
      PathPoint default_0: Hind_Foot_r (-0.0022439 0.0025115 0.0069962)
    Thelen2003Muscle SOLEUS_LAT_2_R: max_isometric_force=1059.433 optimal_fiber_length=0.026 tendon_slack_length=0.085
        pennation_angle_at_optimal=1.0245
      PathPoint default: Tibia_r (-0.010321 0.29161 -0.032466)
      PathPoint default_0: Hind_Foot_r (-0.0022439 0.0025115 0.0069962)
    Thelen2003Muscle SOLEUS_LAT_3_R: max_isometric_force=1059.433 optimal_fiber_length=0.026 tendon_slack_length=0.085
        pennation_angle_at_optimal=1.0245
      PathPoint default: Tibia_r (-0.0093066 0.33074 -0.038424)
      PathPoint default_0: Hind_Foot_r (-0.0022439 0.0025115 0.0069962)
    Thelen2003Muscle TENS_FASC_L_1_R: max_isometric_force=162.8 optimal_fiber_length=0.095 tendon_slack_length=0
        pennation_angle_at_optimal=0
      PathPoint default: Pelvis (0.0283 0.0799 0.1373)
      PathPoint default_0: Tibia_r (0.033382 0.41037 -0.087417)
    Thelen2003Muscle TENS_FASC_L_2_R: max_isometric_force=162.8 optimal_fiber_length=0.095 tendon_slack_length=0
        pennation_angle_at_optimal=0
      PathPoint default: Pelvis (0.0237 0.0901 0.141)
      PathPoint default_0: Tibia_r (0.033382 0.41037 -0.087417)
    Thelen2003Muscle TIBIALIS_ANT_1_R: max_isometric_force=328.0667 optimal_fiber_length=0.046
        tendon_slack_length=0.235 pennation_angle_at_optimal=0.16755
      PathPoint default: Tibia_r (0.023401 0.32867 -0.077325)
      PathPoint default_0: Tibia_r (0.019989 0.010671 -0.042247)
      PathPoint default_1: Mid_Foot_r (0.10772 0.034187 -0.035879)
      PathPoint default_2: Mid_Foot_r (0.12259 0.018622 -0.033789)
    Thelen2003Muscle TIBIALIS_ANT_2_R: max_isometric_force=328.0667 optimal_fiber_length=0.046
        tendon_slack_length=0.235 pennation_angle_at_optimal=0.16755
      PathPoint default: Tibia_r (0.021119 0.30085 -0.07573)
      PathPoint default_0: Tibia_r (0.019989 0.010671 -0.042247)
      PathPoint default_1: Mid_Foot_r (0.10772 0.034187 -0.035879)
      PathPoint default_2: Mid_Foot_r (0.12259 0.018622 -0.033789)
    Thelen2003Muscle TIBIALIS_ANT_3_R: max_isometric_force=328.0667 optimal_fiber_length=0.046
        tendon_slack_length=0.235 pennation_angle_at_optimal=0.16755
      PathPoint default: Tibia_r (0.009666 0.24971 -0.064256)
      PathPoint default_0: Tibia_r (0.019989 0.010671 -0.042247)
      PathPoint default_1: Mid_Foot_r (0.10772 0.034187 -0.035879)
      PathPoint default_2: Mid_Foot_r (0.12259 0.018622 -0.033789)
    Thelen2003Muscle TIBIALIS_POST_MED_1_R: max_isometric_force=266.4 optimal_fiber_length=0.024
        tendon_slack_length=0.11 pennation_angle_at_optimal=0.43982
      PathPoint default: Tibia_r (-9.4398e-5 0.29664 -0.069868)
      PathPoint default_0: Tibia_r (-0.012032 0.061558 -0.023613)
      PathPoint default_1: Tibia_r (-0.011832 0.048872 -0.023834)
      PathPoint default_2: Tibia_r (-0.012798 0.039252 -0.024552)
      PathPoint default_3: Tibia_r (-0.014154 0.030878 -0.024726)
      PathPoint default_4: Tibia_r (-0.014889 0.025738 -0.024513)
      PathPoint default_5: Tibia_r (-0.016071 0.02022 -0.025588)
      PathPoint default_6: Tibia_r (-0.01502 0.014579 -0.026622)
      PathPoint default_7: Tibia_r (-0.014358 0.010183 -0.027111)
      PathPoint default_8: Tibia_r (-0.013868 0.0022584 -0.028833)
      PathPoint default_9: Tibia_r (-0.0093018 -0.0053392 -0.032061)
      PathPoint default_10: Tibia_r (0.0011085 -0.019678 -0.032223)
      PathPoint default_11: Mid_Foot_r (0.07635 0.031177 -0.031438)
    Thelen2003Muscle TIBIALIS_POST_MED_2_R: max_isometric_force=266.4 optimal_fiber_length=0.024
        tendon_slack_length=0.11 pennation_angle_at_optimal=0.43982
      PathPoint default: Tibia_r (-0.0024854 0.2492 -0.060213)
      PathPoint default_0: Tibia_r (-0.012032 0.061558 -0.023613)
      PathPoint default_1: Tibia_r (-0.011832 0.048872 -0.023834)
      PathPoint default_2: Tibia_r (-0.012798 0.039252 -0.024552)
      PathPoint default_3: Tibia_r (-0.014154 0.030878 -0.024726)
      PathPoint default_4: Tibia_r (-0.014889 0.025738 -0.024513)
      PathPoint default_5: Tibia_r (-0.016071 0.02022 -0.025588)
      PathPoint default_6: Tibia_r (-0.01502 0.014579 -0.026622)
      PathPoint default_7: Tibia_r (-0.014358 0.010183 -0.027111)
      PathPoint default_8: Tibia_r (-0.013868 0.0022584 -0.028833)
      PathPoint default_9: Tibia_r (-0.0093018 -0.0053392 -0.032061)
      PathPoint default_10: Tibia_r (0.0011085 -0.019678 -0.032223)
      PathPoint default_11: Mid_Foot_r (0.07635 0.031177 -0.031438)
    Thelen2003Muscle TIBIALIS_POST_MED_3_R: max_isometric_force=266.4 optimal_fiber_length=0.024
        tendon_slack_length=0.11 pennation_angle_at_optimal=0.43982
      PathPoint default: Tibia_r (-0.0028543 0.18786 -0.046312)
      PathPoint default_0: Tibia_r (-0.012032 0.061558 -0.023613)
      PathPoint default_1: Tibia_r (-0.011832 0.048872 -0.023834)
      PathPoint default_2: Tibia_r (-0.012798 0.039252 -0.024552)
      PathPoint default_3: Tibia_r (-0.014154 0.030878 -0.024726)
      PathPoint default_4: Tibia_r (-0.014889 0.025738 -0.024513)
      PathPoint default_5: Tibia_r (-0.016071 0.02022 -0.025588)
      PathPoint default_6: Tibia_r (-0.01502 0.014579 -0.026622)
      PathPoint default_7: Tibia_r (-0.014358 0.010183 -0.027111)
      PathPoint default_8: Tibia_r (-0.013868 0.0022584 -0.028833)
      PathPoint default_9: Tibia_r (-0.0093018 -0.0053392 -0.032061)
      PathPoint default_10: Tibia_r (0.0011085 -0.019678 -0.032223)
      PathPoint default_11: Mid_Foot_r (0.07635 0.031177 -0.031438)
    Thelen2003Muscle TIBIALIS_POST_LAT_1_R: max_isometric_force=266.4 optimal_fiber_length=0.024
        tendon_slack_length=0.11 pennation_angle_at_optimal=0.75224
      PathPoint default: Tibia_r (-0.0017269 0.26341 -0.033979)
      PathPoint default_0: Tibia_r (-0.011832 0.048872 -0.023834)
      PathPoint default_1: Tibia_r (-0.012798 0.039252 -0.024552)
      PathPoint default_2: Tibia_r (-0.014154 0.030878 -0.024726)
      PathPoint default_3: Tibia_r (-0.014889 0.025738 -0.024513)
      PathPoint default_4: Tibia_r (-0.016071 0.02022 -0.025588)
      PathPoint default_5: Tibia_r (-0.01502 0.014579 -0.026622)
      PathPoint default_6: Tibia_r (-0.014358 0.010183 -0.027111)
      PathPoint default_7: Tibia_r (-0.013868 0.0022584 -0.028833)
      PathPoint default_8: Tibia_r (-0.0093018 -0.0053392 -0.032061)
      PathPoint default_9: Tibia_r (0.0011085 -0.019678 -0.032223)
      PathPoint default_10: Mid_Foot_r (0.07635 0.031177 -0.031438)
    Thelen2003Muscle TIBIALIS_POST_LAT_2_R: max_isometric_force=266.4 optimal_fiber_length=0.024
        tendon_slack_length=0.11 pennation_angle_at_optimal=0.75224
      PathPoint default: Tibia_r (-0.0045002 0.19097 -0.020097)
      PathPoint default_0: Tibia_r (-0.011832 0.048872 -0.023834)
      PathPoint default_1: Tibia_r (-0.012798 0.039252 -0.024552)
      PathPoint default_2: Tibia_r (-0.014154 0.030878 -0.024726)
      PathPoint default_3: Tibia_r (-0.014889 0.025738 -0.024513)
      PathPoint default_4: Tibia_r (-0.016071 0.02022 -0.025588)
      PathPoint default_5: Tibia_r (-0.01502 0.014579 -0.026622)
      PathPoint default_6: Tibia_r (-0.014358 0.010183 -0.027111)
      PathPoint default_7: Tibia_r (-0.013868 0.0022584 -0.028833)
      PathPoint default_8: Tibia_r (-0.0093018 -0.0053392 -0.032061)
      PathPoint default_9: Tibia_r (0.0011085 -0.019678 -0.032223)
      PathPoint default_10: Mid_Foot_r (0.07635 0.031177 -0.031438)
    Thelen2003Muscle TIBIALIS_POST_LAT_3_R: max_isometric_force=266.4 optimal_fiber_length=0.024
        tendon_slack_length=0.11 pennation_angle_at_optimal=0.75224
      PathPoint default: Tibia_r (-0.0031731 0.12077 -0.0056531)
      PathPoint default_0: Tibia_r (-0.011832 0.048872 -0.023834)
      PathPoint default_1: Tibia_r (-0.012798 0.039252 -0.024552)
      PathPoint default_2: Tibia_r (-0.014154 0.030878 -0.024726)
      PathPoint default_3: Tibia_r (-0.014889 0.025738 -0.024513)
      PathPoint default_4: Tibia_r (-0.016071 0.02022 -0.025588)
      PathPoint default_5: Tibia_r (-0.01502 0.014579 -0.026622)
      PathPoint default_6: Tibia_r (-0.014358 0.010183 -0.027111)
      PathPoint default_7: Tibia_r (-0.013868 0.0022584 -0.028833)
      PathPoint default_8: Tibia_r (-0.0093018 -0.0053392 -0.032061)
      PathPoint default_9: Tibia_r (0.0011085 -0.019678 -0.032223)
      PathPoint default_10: Mid_Foot_r (0.07635 0.031177 -0.031438)
    Thelen2003Muscle VASTUS_INTERM_1_R: max_isometric_force=234.95 optimal_fiber_length=0.077 tendon_slack_length=0.126
        pennation_angle_at_optimal=0.20595
      PathPoint default: Femur_r (0.029146 -0.2344 0.0065505)
      PathPoint default_0: Patella_r (0 0 0)
      PathWrap: wrap_object=WrapFemur2_R
    Thelen2003Muscle VASTUS_INTERM_2_R: max_isometric_force=234.95 optimal_fiber_length=0.077 tendon_slack_length=0.126
        pennation_angle_at_optimal=0.20595
      PathPoint default: Femur_r (0.023078 -0.17855 0.015839)
      PathPoint default_0: Patella_r (0 0 0)
      PathWrap: wrap_object=WrapFemur2_R
    Thelen2003Muscle VASTUS_INTERM_3_R: max_isometric_force=234.95 optimal_fiber_length=0.077 tendon_slack_length=0.126
        pennation_angle_at_optimal=0.20595
      PathPoint default: Femur_r (0.015784 -0.11881 0.030239)
      PathPoint default_0: Patella_r (0 0 0)
      PathWrap: wrap_object=WrapFemur2_R
    Thelen2003Muscle VASTUS_INTERM_4_R: max_isometric_force=234.95 optimal_fiber_length=0.077 tendon_slack_length=0.126
        pennation_angle_at_optimal=0.20595
      PathPoint default: Femur_r (0.027238 -0.23685 0.018421)
      PathPoint default_0: Patella_r (-0.006 0.0003 0.01)
      PathWrap: wrap_object=WrapFemur2_R
    Thelen2003Muscle VASTUS_INTERM_5_R: max_isometric_force=234.95 optimal_fiber_length=0.077 tendon_slack_length=0.126
        pennation_angle_at_optimal=0.20595
      PathPoint default: Femur_r (0.020841 -0.18148 0.029877)
      PathPoint default_0: Patella_r (-0.006 0.0003 0.01)
      PathWrap: wrap_object=WrapFemur2_R
    Thelen2003Muscle VASTUS_INTERM_6_R: max_isometric_force=234.95 optimal_fiber_length=0.077 tendon_slack_length=0.126
        pennation_angle_at_optimal=0.20595
      PathPoint default: Femur_r (0.014058 -0.12122 0.041122)
      PathPoint default_0: Patella_r (-0.006 0.0003 0.01)
      PathWrap: wrap_object=WrapFemur2_R
    Thelen2003Muscle VASTUS_LAT_INF_1_R: max_isometric_force=65.9833 optimal_fiber_length=0.042
        tendon_slack_length=0.096 pennation_angle_at_optimal=0
      PathPoint default: Femur_r (-0.0050261 -0.29416 0.017684)
      PathPoint default_0: Patella_r (-0.006 0.0003 0.01)
      PathWrap: wrap_object=WrapFemur2_R
    Thelen2003Muscle VASTUS_LAT_INF_2_R: max_isometric_force=65.9833 optimal_fiber_length=0.042
        tendon_slack_length=0.096 pennation_angle_at_optimal=0
      PathPoint default: Femur_r (-0.0042854 -0.24829 0.018853)
      PathPoint default_0: Patella_r (-0.006 0.0003 0.01)
      PathWrap: wrap_object=WrapFemur2_R
    Thelen2003Muscle VASTUS_LAT_INF_3_R: max_isometric_force=65.9833 optimal_fiber_length=0.042
        tendon_slack_length=0.096 pennation_angle_at_optimal=0
      PathPoint default: Femur_r (-0.005411 -0.20296 0.023188)
      PathPoint default_0: Patella_r (-0.006 0.0003 0.01)
      PathWrap: wrap_object=WrapFemur2_R
    Thelen2003Muscle VASTUS_LAT_INF_4_R: max_isometric_force=65.9833 optimal_fiber_length=0.042
        tendon_slack_length=0.096 pennation_angle_at_optimal=0
      PathPoint default: Femur_r (-0.0083447 -0.15808 0.030776)
      PathPoint default_0: Patella_r (-0.006 0.0003 0.01)
      PathWrap: wrap_object=WrapFemur2_R
    Thelen2003Muscle VASTUS_LAT_INF_5_R: max_isometric_force=65.9833 optimal_fiber_length=0.042
        tendon_slack_length=0.096 pennation_angle_at_optimal=0
      PathPoint default: Femur_r (-0.0131 -0.11376 0.041619)
      PathPoint default_0: Patella_r (-0.006 0.0003 0.01)
      PathWrap: wrap_object=WrapFemur2_R
    Thelen2003Muscle VASTUS_LAT_INF_6_R: max_isometric_force=65.9833 optimal_fiber_length=0.042
        tendon_slack_length=0.096 pennation_angle_at_optimal=0
      PathPoint default: Femur_r (-0.019574 -0.069892 0.055671)
      PathPoint default_0: Patella_r (-0.006 0.0003 0.01)
      PathWrap: wrap_object=WrapFemur2_R
    Thelen2003Muscle VASTUS_LAT_SUP_1_R: max_isometric_force=1091.5 optimal_fiber_length=0.091
        tendon_slack_length=0.096 pennation_angle_at_optimal=0
      PathPoint default: Femur_r (-0.00037466 -0.031033 0.067584)
      PathPoint default_0: Patella_r (-0.006 0.0003 0.01)
      PathWrap: wrap_object=WrapFemur2_R
    Thelen2003Muscle VASTUS_LAT_SUP_2_R: max_isometric_force=1091.5 optimal_fiber_length=0.091
        tendon_slack_length=0.096 pennation_angle_at_optimal=0
      PathPoint default: Femur_r (0.013183 -0.016183 0.050667)
      PathPoint default_0: Patella_r (-0.006 0.0003 0.01)
      PathWrap: wrap_object=WrapFemur2_R
    Thelen2003Muscle VASTUS_MED_INF_1_R: max_isometric_force=181.3 optimal_fiber_length=0.076 tendon_slack_length=0.096
        pennation_angle_at_optimal=0
      PathPoint default: Femur_r (0.0014327 -0.29733 -0.0015902)
      PathPoint default_0: Patella_r (0 0 0)
      PathWrap: wrap_object=WrapFemur2_R
    Thelen2003Muscle VASTUS_MED_INF_2_R: max_isometric_force=181.3 optimal_fiber_length=0.076 tendon_slack_length=0.096
        pennation_angle_at_optimal=0
      PathPoint default: Femur_r (0.011381 -0.2967 -0.0062576)
      PathPoint default_0: Patella_r (0 0 0)
      PathWrap: wrap_object=WrapFemur2_R
    Thelen2003Muscle VASTUS_MED_MID_1_R: max_isometric_force=429.2 optimal_fiber_length=0.076 tendon_slack_length=0.096
        pennation_angle_at_optimal=0
      PathPoint default: Femur_r (0.0051778 -0.25203 0.0031987)
      PathPoint default_0: Patella_r (0 0 0)
      PathWrap: wrap_object=WrapFemur2_R
    Thelen2003Muscle VASTUS_MED_MID_2_R: max_isometric_force=429.2 optimal_fiber_length=0.076 tendon_slack_length=0.096
        pennation_angle_at_optimal=0
      PathPoint default: Femur_r (0.014893 -0.25146 -0.001241)
      PathPoint default_0: Patella_r (0 0 0)
      PathWrap: wrap_object=WrapFemur2_R
    Thelen2003Muscle VASTUS_MED_SUP_1_R: max_isometric_force=165.8833 optimal_fiber_length=0.083
        tendon_slack_length=0.096 pennation_angle_at_optimal=0
      PathPoint default: Femur_r (0.0047704 -0.1997 0.011088)
      PathPoint default_0: Patella_r (0 0 0)
      PathWrap: wrap_object=WrapFemur2_R
    Thelen2003Muscle VASTUS_MED_SUP_2_R: max_isometric_force=165.8833 optimal_fiber_length=0.083
        tendon_slack_length=0.096 pennation_angle_at_optimal=0
      PathPoint default: Femur_r (0.013619 -0.19921 0.0069711)
      PathPoint default_0: Patella_r (0 0 0)
      PathWrap: wrap_object=WrapFemur2_R
    Thelen2003Muscle VASTUS_MED_SUP_3_R: max_isometric_force=165.8833 optimal_fiber_length=0.083
        tendon_slack_length=0.096 pennation_angle_at_optimal=0
      PathPoint default: Femur_r (0.0017705 -0.14689 0.020189)
      PathPoint default_0: Patella_r (0 0 0)
      PathWrap: wrap_object=WrapFemur2_R
    Thelen2003Muscle VASTUS_MED_SUP_4_R: max_isometric_force=165.8833 optimal_fiber_length=0.083
        tendon_slack_length=0.096 pennation_angle_at_optimal=0
      PathPoint default: Femur_r (0.010619 -0.1464 0.016073)
      PathPoint default_0: Patella_r (0 0 0)
      PathWrap: wrap_object=WrapFemur2_R
    Thelen2003Muscle VASTUS_MED_SUP_5_R: max_isometric_force=165.8833 optimal_fiber_length=0.083
        tendon_slack_length=0.096 pennation_angle_at_optimal=0
      PathPoint default: Femur_r (0.0021699 -0.080073 0.029804)
      PathPoint default_0: Patella_r (0 0 0)
      PathWrap: wrap_object=WrapFemur2_R
    Thelen2003Muscle VASTUS_MED_SUP_6_R: max_isometric_force=165.8833 optimal_fiber_length=0.083
        tendon_slack_length=0.096 pennation_angle_at_optimal=0
      PathPoint default: Femur_r (0.0067483 -0.079852 0.027611)
      PathPoint default_0: Patella_r (0 0 0)
      PathWrap: wrap_object=WrapFemur2_R
