# OpenSim document version 40000
Model StructuralFemurLeft-LondonLowerLimbModel:
  gravity: 0 -9.80665 0
  length_units: meters
  force_units: N
  credits:
    Modenese L. Imperial College Structural Biomechanics Group http://www.imperial.ac.uk/structuralbiomechanics
  publications:
    Details and references of the SB lower limb model: 1) Muscle attachments, joint kinematics (patella included) and muscle contraction parameters are based on the anatomical dataset published by Klein Horsman M. D., Koopman H. F. J. M. et al, "Morphological muscle and joint parameters for musculoskeletal modelling of the lower extremity", Clin Biomech, 22:239-247, 2007. 2) The ISB anatomical coordinate systems are adopted in the model. Wu G., Siegler S. et al. "ISB recommendation on definitions of joint coordinate system of various joints for the reporting of human joint motion--part I: ankle, hip, and spine." J Biomech 35:543-548, 2002. 3) In the original dataset the insertion of the muscle Adductor magnus (dist) is located in the tibia. This is anatomically not correct (Gray, H, "Anatomy of the Human Body". Philadelphia: Lea and Febiger, 1918;) and the insertion was moved to the femur. 4) In the original dataset the rest position of the foot is rotated externally in an unnatural way. A rest position coincident with the ISB reference position was hence adopted for the foot. Because of this choice, the talocrural joint axis in the foot results slightly different from the original one, while the axis on the tibia is unchanged. It is possible to use the original joint by modifying the orientation of the segment "Hind_Foot" with the values available in the comment to the talocrural joint. 5) A cylindrical wrapping surface representing the anterior femural condyles was introduced in the model to match experimental measurement of quadriceps moment arm (see Buford, W. L., Jr., Ivey, F. M. Jr. et al, "Muscle balance at the knee--moment arms for the normal knee and the ACL-minus knee", IEEE Trans Rehabil Eng, 5:367-379, 1997). The bundles of the quadriceps are affected for knee flexion angles higher then about 90 degrees. 6) Joint range of motion was limited using the values published in Boone, D. C. and Azen, S. P. "Normal range of motion of joints in male subjects", J Bone Joint Surg Am 61:756-759, 1979.
  Ground
  BodySet:
    Body Pelvis: mass=3.18 [kg] mass_center=(0.014 0.054 0.0005) inertia=(0.012 0.017 0.012 0 0 0)
        meshes=(Hors_pelvis_r.obj Hors_pelvis_l.obj Hors_sacrum.obj)
      WrapCylinder WrapPelvis_L: xyz_body_rotation=(0.143687 0.211575 -0.6981) translation=(-0.0127 0.0097 -0.0722)
          quadrant=x radius=0.0399 length=0.2
      WrapEllipsoid Wrap1_Glut_Max_Pelvis_L: xyz_body_rotation=(1.40622 -1.46366 3.1334)
          translation=(-0.0153 -0.1354 -0.0335) quadrant=X dimensions=(0.2648 0.0914 0.0914)
      WrapEllipsoid Wrap2_Glut_Max_Pelvis_L: xyz_body_rotation=(1.40622 -1.46366 3.1334)
          translation=(-0.0053 -0.1354 -0.0335) quadrant=X dimensions=(0.2648 0.0914 0.0914)
    Body Femur_l: mass=11.54 mass_center=(0.010112 -0.159559 0.015013) inertia=(0.197 0.058 0.197 0 0 0)
        meshes=SB_femur_Left_ascii.vtp
      WrapEllipsoid Wrap1_Glut_Max_Femur_L: xyz_body_rotation=(1.40622 -1.46366 3.1334)
          translation=(-0.0153 -0.1354 0.045) quadrant=X dimensions=(0.35 0.0651 0.0651)
      WrapEllipsoid Wrap2_Glut_Max_Femur_L: xyz_body_rotation=(1.40622 -1.46366 3.1334)
          translation=(-0.0053 -0.1354 0.045) quadrant=X dimensions=(0.35 0.0651 0.0651)
      WrapEllipsoid Capsule1_L: translation=(0 0 0) quadrant=-X dimensions=(0.02736 0.02736 0.02736)
      WrapCylinder Wrap_Femur_Shaft_Medialis_L: xyz_body_rotation=(1.4632 0.0678 0)
          translation=(0.0056 -0.3168 -0.0125) quadrant=Y radius=0.0125 length=0.5
      WrapCylinder Wrap_Femur_Shaft_Lateralis_L: xyz_body_rotation=(1.4632 0.0678 0)
          translation=(0.0056 -0.3168 -0.0125) quadrant=-Y radius=0.0125 length=0.5
      WrapCylinder Wrap_Quadriceps_Anterior_L: xyz_body_rotation=(0.0635214 -0.0977677 1.618)
          translation=(0.00817365 -0.407715 -0.0148761) quadrant=-Y radius=0.0246 length=0.15
      WrapCylinder Wrap_Gastrocs_Plantaris_Posterior_L: xyz_body_rotation=(0.0635214 -0.0977677 1.618)
          translation=(-0.008 -0.417 0) quadrant=Y radius=0.02 length=0.15
    Body Patella_l: mass=1e-5 mass_center=(0 0 0) inertia=(1e-6 1e-6 1e-6 0 0 0) meshes=Hors_patella_l.obj
    Body Tibia_l: mass=4 mass_center=(0.002994 0.22273 0.072495) inertia=(0.058 0.007 0.058 0 0 0)
        meshes=(Hors_tibia_l.obj Hors_fibula_l.obj)
    Body Hind_Foot_l: mass=1.3 mass_center=(0.0997098 0.00452056 0.00072954) inertia=(0.001 0.005 0.005 0 0 0)
        meshes=Hors_talus_l.obj
    Body Mid_Foot_l: mass=1e-7 mass_center=(0 0 0) inertia=(1e-7 1e-7 1e-7 0 0 0) meshes=Hors_foot_l.obj
    Body Phal_l: mass=0 mass_center=(0 0 0) inertia=(0 0 0 0 0 0) meshes=Hors_bofoot_l.obj
  JointSet:
    CustomJoint ground_pelvis: socket_parent_frame=ground_offset socket_child_frame=Pelvis_offset
      Coordinate A-P-LAB-X: default_value=0 range=(-3.14 3.14) clamped=true
      Coordinate A-P-LAB-Y: default_value=0 range=(-3.14 3.14) clamped=true
      Coordinate A-P-LAB-Z: default_value=0 range=(-3.14 3.14) clamped=true
      Coordinate Pelv_trans_x: default_value=0.2 range=(-5 5) clamped=false
      Coordinate Pelv_trans_y: default_value=0.9 range=(-1.5 2) clamped=false
      Coordinate Pelv_trans_z: default_value=0 range=(-3 3) clamped=false
      PhysicalOffsetFrame ground_offset: socket_parent=/ground translation=(0 0 0) [meters]
      PhysicalOffsetFrame Pelvis_offset: socket_parent=/bodyset/Pelvis translation=(0 0 0)
      SpatialTransform:
        TransformAxis rotation1: coordinates=A-P-LAB-X axis=(1 0 0) LinearFunction(coefficients=1 0)
        TransformAxis rotation2: coordinates=A-P-LAB-Y axis=(0 1 0) LinearFunction(coefficients=1 0)
        TransformAxis rotation3: coordinates=A-P-LAB-Z axis=(0 0 1) LinearFunction(coefficients=1 0)
        TransformAxis translation1: coordinates=Pelv_trans_x axis=(1 0 0) LinearFunction(coefficients=1 0)
        TransformAxis translation2: coordinates=Pelv_trans_y axis=(0 1 0) LinearFunction(coefficients=1 0)
        TransformAxis translation3: coordinates=Pelv_trans_z axis=(0 0 1) LinearFunction(coefficients=1 0)
    CustomJoint hip_l: socket_parent_frame=Pelvis_offset socket_child_frame=Femur_l_offset
      Coordinate A-PTL-FL: default_value=0 range=(-0.2111848 2.117084) clamped=true
      Coordinate A-PTL-AB: default_value=0 range=(-0.7068583 0.4468043) clamped=true
      Coordinate A-PTL-RO: default_value=0 range=(-0.7714355 0.7749262) clamped=true
      PhysicalOffsetFrame Pelvis_offset: socket_parent=/bodyset/Pelvis translation=(0 0 -0.0897)
      PhysicalOffsetFrame Femur_l_offset: socket_parent=/bodyset/Femur_l translation=(0 0 0)
      SpatialTransform: axes_held_at_zero=(translation1 translation2 translation3)
        TransformAxis rotation1: coordinates=A-PTL-FL axis=(0 0 1) LinearFunction(coefficients=1 0)
        TransformAxis rotation2: coordinates=A-PTL-AB axis=(1 0 0) LinearFunction(coefficients=1 0)
        TransformAxis rotation3: coordinates=A-PTL-RO axis=(0 1 0) LinearFunction(coefficients=1 0)
    CustomJoint fem_pat_l: socket_parent_frame=Femur_l_offset socket_child_frame=Patella_l_offset
      Coordinate pat_rot_l: default_value=0 range=(-3 3) clamped=true
      PhysicalOffsetFrame Femur_l_offset: socket_parent=/bodyset/Femur_l translation=(-0.0114 -0.3933 -0.0151)
      PhysicalOffsetFrame Patella_l_offset: socket_parent=/bodyset/Patella_l translation=(-0.0642 -0.0258 -0.0139)
      SpatialTransform: axes_held_at_zero=(rotation2 rotation3 translation1 translation2 translation3)
        TransformAxis rotation1: coordinates=pat_rot_l axis=(0.01126692 -0.05745084 0.9982848)
            LinearFunction(coefficients=1 0)
    CustomJoint knee_l: socket_parent_frame=Femur_l_offset socket_child_frame=Tibia_l_offset
      Coordinate A-TSL-FL: default_value=0 range=(-2.460914 0.02617994) clamped=true
      PhysicalOffsetFrame Femur_l_offset: socket_parent=/bodyset/Femur_l translation=(-0.0138 -0.4165 -0.0097)
      PhysicalOffsetFrame Tibia_l_offset: socket_parent=/bodyset/Tibia_l translation=(-0.007574 0.387801 0.0913)
          orientation=(0.218123 -0.6351 0.0336583) [radians]
      SpatialTransform: axes_held_at_zero=(rotation2 rotation3 translation1 translation2 translation3)
        TransformAxis rotation1: coordinates=A-TSL-FL axis=(0.1039731 0.06154294 0.9919688)
            LinearFunction(coefficients=1 0)
    CustomJoint Talocrural_l: socket_parent_frame=Tibia_l_offset socket_child_frame=Hind_Foot_l_offset
      Coordinate A-SFL-FL: default_value=0 range=(-0.9477138 0.4363) clamped=true
      PhysicalOffsetFrame Tibia_l_offset: socket_parent=/bodyset/Tibia_l translation=(0.00913874 -0.0131919 0.00809682)
          orientation=(0.263635 -0.555583 0)
      PhysicalOffsetFrame Hind_Foot_l_offset: socket_parent=/bodyset/Hind_Foot_l
          translation=(0.0534357 0.05422 0.0234838)
      SpatialTransform: axes_held_at_zero=(rotation2 rotation3 translation1 translation2 translation3)
        TransformAxis rotation1: coordinates=A-SFL-FL axis=(0.2969459 0.1848146 0.9365718)
            LinearFunction(coefficients=1 0)
    CustomJoint Subtalar_l: socket_parent_frame=Hind_Foot_l_offset socket_child_frame=Mid_Foot_l_offset
      Coordinate Subtalar_l: default_value=0 range=(-0.6318 0.3351) clamped=true
      PhysicalOffsetFrame Hind_Foot_l_offset: socket_parent=/bodyset/Hind_Foot_l translation=(0.0598 0.061 0.038)
      PhysicalOffsetFrame Mid_Foot_l_offset: socket_parent=/bodyset/Mid_Foot_l translation=(0.0598 0.061 0.038)
      SpatialTransform: axes_held_at_zero=(rotation2 rotation3 translation1 translation2 translation3)
        TransformAxis rotation1: coordinates=Subtalar_l axis=(0.5701958 0.6769711 0.4645125)
            LinearFunction(coefficients=1 0)
    WeldJoint toes: socket_parent_frame=Mid_Foot_l_offset socket_child_frame=Phal_l_offset
      PhysicalOffsetFrame Mid_Foot_l_offset: socket_parent=/bodyset/Mid_Foot_l translation=(0 0 0)
      PhysicalOffsetFrame Phal_l_offset: socket_parent=/bodyset/Phal_l translation=(0 0 0)
  ConstraintSet:
    CoordinateCouplerConstraint pat_planar_mov: independent_coordinate_names=A-TSL-FL
        dependent_coordinate_name=pat_rot_l
      coupled_coordinates_function: SimmSpline: x=(-2.44346 -2.42601 -2.40855 -2.3911 -2.37365 -2.35619 -2.33874 -2.32129 -2.30383 -2.28638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)
          y=(-2.28196 -2.26451 -2.24706 -2.2296 -2.21215 -2.1947 -2.17724 -2.15979 -2.14234 -2.12488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)
  ForceSet:
    CoordinateActuator TrX: coordinate=Pelv_trans_x optimal_force=130.6539
    CoordinateActuator TrY: coordinate=Pelv_trans_y optimal_force=926.2952
    CoordinateActuator TrZ: coordinate=Pelv_trans_z optimal_force=71.8333
    CoordinateActuator ROTX: coordinate=A-P-LAB-X optimal_force=91.4081
    CoordinateActuator ROTY: coordinate=A-P-LAB-Y optimal_force=15.225
    CoordinateActuator ROTZ: coordinate=A-P-LAB-Z optimal_force=163.3623
    Thelen2003Muscle ADD_BREV_PROS_1_L: max_isometric_force=70.3 optimal_fiber_length=0.095 tendon_slack_length=0
        pennation_angle_at_optimal=0 [radians]
      PathPoint default: Pelvis (0.046196 -0.013015 -0.0205)
      PathPoint default_0: Femur_l (-0.022557 -0.083294 -0.029506)
    Thelen2003Muscle ADD_BREV_PROS_2_L: max_isometric_force=70.3 optimal_fiber_length=0.095 tendon_slack_length=0
        pennation_angle_at_optimal=0
      PathPoint default: Pelvis (0.050696 -0.013217 -0.0185)
      PathPoint default_0: Femur_l (-0.020854 -0.094792 -0.029774)
    Thelen2003Muscle ADD_BREV_MID_1_L: max_isometric_force=64.75 optimal_fiber_length=0.104 tendon_slack_length=0
        pennation_angle_at_optimal=0
      PathPoint default: Pelvis (0.045694 -0.018215 -0.0136)
      PathPoint default_0: Femur_l (-0.019679 -0.10842 -0.028451)
    Thelen2003Muscle ADD_BREV_MID_2_L: max_isometric_force=64.75 optimal_fiber_length=0.104 tendon_slack_length=0
        pennation_angle_at_optimal=0
      PathPoint default: Pelvis (0.049294 -0.018416 -0.0119)
      PathPoint default_0: Femur_l (-0.020159 -0.12243 -0.029604)
    Thelen2003Muscle ADD_BREV_DIST_1_L: max_isometric_force=59.2 optimal_fiber_length=0.112 tendon_slack_length=0
        pennation_angle_at_optimal=0
      PathPoint default: Pelvis (0.038591 -0.025713 -0.0063)
      PathPoint default_0: Femur_l (-0.019478 -0.13432 -0.029533)
    Thelen2003Muscle ADD_BREV_DIST_2_L: max_isometric_force=59.2 optimal_fiber_length=0.112 tendon_slack_length=0
        pennation_angle_at_optimal=0
      PathPoint default: Pelvis (0.040891 -0.025814 -0.0052)
      PathPoint default_0: Femur_l (-0.017854 -0.14626 -0.027849)
    Thelen2003Muscle ADD_LONG_1_L: max_isometric_force=93.1167 optimal_fiber_length=0.106 tendon_slack_length=0
        pennation_angle_at_optimal=0
      PathPoint default: Pelvis (0.052497 -0.0092175 -0.0233)
      PathPoint default_0: Femur_l (-0.012711 -0.18089 -0.018817)
    Thelen2003Muscle ADD_LONG_2_L: max_isometric_force=93.1167 optimal_fiber_length=0.106 tendon_slack_length=0
        pennation_angle_at_optimal=0
      PathPoint default: Pelvis (0.054396 -0.011618 -0.0208)
      PathPoint default_0: Femur_l (-0.012869 -0.19231 -0.01926)
    Thelen2003Muscle ADD_LONG_3_L: max_isometric_force=93.1167 optimal_fiber_length=0.106 tendon_slack_length=0
        pennation_angle_at_optimal=0
      PathPoint default: Pelvis (0.055695 -0.013719 -0.0178)
      PathPoint default_0: Femur_l (-0.011661 -0.20448 -0.016947)
    Thelen2003Muscle ADD_LONG_4_L: max_isometric_force=93.1167 optimal_fiber_length=0.106 tendon_slack_length=0
        pennation_angle_at_optimal=0
      PathPoint default: Pelvis (0.056295 -0.015619 -0.0146)
      PathPoint default_0: Femur_l (-0.01128 -0.21906 -0.015986)
    Thelen2003Muscle ADD_LONG_5_L: max_isometric_force=93.1167 optimal_fiber_length=0.106 tendon_slack_length=0
        pennation_angle_at_optimal=0
      PathPoint default: Pelvis (0.056094 -0.017319 -0.0112)
      PathPoint default_0: Femur_l (-0.010542 -0.23361 -0.014308)
    Thelen2003Muscle ADD_LONG_6_L: max_isometric_force=93.1167 optimal_fiber_length=0.106 tendon_slack_length=0
        pennation_angle_at_optimal=0
      PathPoint default: Pelvis (0.054994 -0.018818 -0.0077)
      PathPoint default_0: Femur_l (-0.0097631 -0.24603 -0.012875)
    Thelen2003Muscle ADD_MAG_DIST_1_L: max_isometric_force=326.8333 optimal_fiber_length=0.108
        tendon_slack_length=0.042 pennation_angle_at_optimal=0
      PathPoint default: Pelvis (-0.021024 -0.070993 -0.0412)
      PathPoint default_0: Femur_l (0.0010095 -0.37548 0.018054)
    Thelen2003Muscle ADD_MAG_DIST_2_L: max_isometric_force=326.8333 optimal_fiber_length=0.108
        tendon_slack_length=0.042 pennation_angle_at_optimal=0
      PathPoint default: Pelvis (-0.015122 -0.067095 -0.034)
      PathPoint default_0: Femur_l (0.0016748 -0.38386 0.022402)
    Thelen2003Muscle ADD_MAG_DIST_3_L: max_isometric_force=326.8333 optimal_fiber_length=0.108
        tendon_slack_length=0.042 pennation_angle_at_optimal=0
      PathPoint default: Pelvis (0.0020807 -0.057801 -0.0194)
      PathPoint default_0: Femur_l (0.00039446 -0.39366 0.029626)
    Thelen2003Muscle ADD_MAG_MID_1_L: max_isometric_force=136.2833 optimal_fiber_length=0.104 tendon_slack_length=0
        pennation_angle_at_optimal=0
      PathPoint default: Pelvis (-0.027923 -0.068991 -0.0403)
      PathPoint default_0: Femur_l (-0.012664 -0.2048 -0.019228)
    Thelen2003Muscle ADD_MAG_MID_2_L: max_isometric_force=136.2833 optimal_fiber_length=0.104 tendon_slack_length=0
        pennation_angle_at_optimal=0
      PathPoint default: Pelvis (-0.025022 -0.066792 -0.0444)
      PathPoint default_0: Femur_l (-0.012664 -0.2048 -0.019228)
    Thelen2003Muscle ADD_MAG_MID_3_L: max_isometric_force=136.2833 optimal_fiber_length=0.104 tendon_slack_length=0
        pennation_angle_at_optimal=0
      PathPoint default: Pelvis (-0.021222 -0.065993 -0.0344)
      PathPoint default_0: Femur_l (-0.011333 -0.2369 -0.016162)
    Thelen2003Muscle ADD_MAG_MID_4_L: max_isometric_force=136.2833 optimal_fiber_length=0.104 tendon_slack_length=0
        pennation_angle_at_optimal=0
      PathPoint default: Pelvis (-0.018721 -0.064194 -0.0379)
      PathPoint default_0: Femur_l (-0.011333 -0.2369 -0.016162)
    Thelen2003Muscle ADD_MAG_MID_5_L: max_isometric_force=136.2833 optimal_fiber_length=0.104 tendon_slack_length=0
        pennation_angle_at_optimal=0
      PathPoint default: Pelvis (-0.012521 -0.062096 -0.0273)
      PathPoint default_0: Femur_l (-0.009098 -0.26905 -0.012295)
    Thelen2003Muscle ADD_MAG_MID_6_L: max_isometric_force=136.2833 optimal_fiber_length=0.104 tendon_slack_length=0
        pennation_angle_at_optimal=0
      PathPoint default: Pelvis (-0.01062 -0.060696 -0.0299)
      PathPoint default_0: Femur_l (-0.009098 -0.26905 -0.012295)
    Thelen2003Muscle ADD_MAG_PROX_1_L: max_isometric_force=46.25 optimal_fiber_length=0.107 tendon_slack_length=0
        pennation_angle_at_optimal=0
      PathPoint default: Pelvis (0.018585 -0.045006 -0.0123)
      PathPoint default_0: Femur_l (-0.013253 -0.10941 -0.021808)
    Thelen2003Muscle ADD_MAG_PROX_2_L: max_isometric_force=46.25 optimal_fiber_length=0.107 tendon_slack_length=0
        pennation_angle_at_optimal=0
      PathPoint default: Pelvis (0.0038822 -0.053301 -0.0221)
      PathPoint default_0: Femur_l (-0.011913 -0.13253 -0.01966)
    Thelen2003Muscle ADD_MAG_PROX_3_L: max_isometric_force=46.25 optimal_fiber_length=0.107 tendon_slack_length=0
        pennation_angle_at_optimal=0
      PathPoint default: Pelvis (0.011284 -0.049204 -0.0172)
      PathPoint default_0: Femur_l (-0.012828 -0.15266 -0.019469)
    Thelen2003Muscle ADD_MAG_PROX_4_L: max_isometric_force=46.25 optimal_fiber_length=0.107 tendon_slack_length=0
        pennation_angle_at_optimal=0
      PathPoint default: Pelvis (0.018585 -0.045006 -0.0123)
      PathPoint default_0: Femur_l (-0.01199 -0.17632 -0.017701)
    Thelen2003Muscle BIC_FEM_CL_1_L: max_isometric_force=1006.4 optimal_fiber_length=0.085 tendon_slack_length=0.13
        pennation_angle_at_optimal=0.52185
      PathPoint default: Pelvis (-0.03782 -0.060887 -0.0726)
      PathPoint default_0: Tibia_l (0.0089334 0.35544 0.045168)
    Thelen2003Muscle BIC_FEM_CB_1_L: max_isometric_force=145.5333 optimal_fiber_length=0.091 tendon_slack_length=0.031
        pennation_angle_at_optimal=0
      PathPoint default: Femur_l (-0.013629 -0.2001 -0.027045)
      PathPoint default_0: Tibia_l (0.0089334 0.35544 0.045168)
    Thelen2003Muscle BIC_FEM_CB_2_L: max_isometric_force=145.5333 optimal_fiber_length=0.091 tendon_slack_length=0.031
        pennation_angle_at_optimal=0
      PathPoint default: Femur_l (-0.011259 -0.24499 -0.019478)
      PathPoint default_0: Tibia_l (0.0089334 0.35544 0.045168)
    Thelen2003Muscle BIC_FEM_CB_3_L: max_isometric_force=145.5333 optimal_fiber_length=0.091 tendon_slack_length=0.031
        pennation_angle_at_optimal=0
      PathPoint default: Femur_l (-0.0086623 -0.29622 -0.015521)
      PathPoint default_0: Tibia_l (0.0089334 0.35544 0.045168)
    Thelen2003Muscle EXT_DIG_LONG_1_L: max_isometric_force=66.6 optimal_fiber_length=0.06 tendon_slack_length=0.301
        pennation_angle_at_optimal=0.14486
      PathPoint default: Tibia_l (0.001398 0.29286 0.037586)
      PathPoint default_0: Tibia_l (0.022727 0.042492 -0.0025848)
      PathPoint default_1: Tibia_l (0.023876 0.031516 -0.0046392)
      PathPoint default_2: Tibia_l (0.025412 0.019967 -0.0082813)
      PathPoint default_3: Tibia_l (0.025163 0.0082483 -0.011038)
      PathPoint default_4: Mid_Foot_l (0.083414 0.06092 -0.006175)
      PathPoint default_5: Phal_l (0.22001 0.017508 -0.019876)
    Thelen2003Muscle EXT_DIG_LONG_2_L: max_isometric_force=66.6 optimal_fiber_length=0.06 tendon_slack_length=0.301
        pennation_angle_at_optimal=0.14486
      PathPoint default: Tibia_l (0.012246 0.33038 0.049737)
      PathPoint default_0: Tibia_l (0.022727 0.042492 -0.0025848)
      PathPoint default_1: Tibia_l (0.023876 0.031516 -0.0046392)
      PathPoint default_2: Tibia_l (0.025412 0.019967 -0.0082813)
      PathPoint default_3: Tibia_l (0.025163 0.0082483 -0.011038)
      PathPoint default_4: Mid_Foot_l (0.083414 0.06092 -0.006175)
      PathPoint default_5: Phal_l (0.22001 0.017508 -0.019876)
    Thelen2003Muscle EXT_DIG_LONG_3_L: max_isometric_force=66.6 optimal_fiber_length=0.06 tendon_slack_length=0.301
        pennation_angle_at_optimal=0.14486
      PathPoint default: Tibia_l (0.021991 0.35389 0.058551)
      PathPoint default_0: Tibia_l (0.022727 0.042492 -0.0025848)
      PathPoint default_1: Tibia_l (0.023876 0.031516 -0.0046392)
      PathPoint default_2: Tibia_l (0.025412 0.019967 -0.0082813)
      PathPoint default_3: Tibia_l (0.025163 0.0082483 -0.011038)
      PathPoint default_4: Mid_Foot_l (0.083414 0.06092 -0.006175)
      PathPoint default_5: Phal_l (0.22001 0.017508 -0.019876)
    Thelen2003Muscle EXT_HAL_LONG_1_L: max_isometric_force=75.2333 optimal_fiber_length=0.06 tendon_slack_length=0.178
        pennation_angle_at_optimal=0.25133
      PathPoint default: Tibia_l (-0.0024558 0.14455 0.0073818)
      PathPoint default_0: Tibia_l (0.024572 0.06236 0.013994)
      PathPoint default_1: Tibia_l (0.026093 0.042228 0.010928)
      PathPoint default_2: Tibia_l (0.027359 0.032484 0.011607)
      PathPoint default_3: Tibia_l (0.028567 0.021789 0.011985)
      PathPoint default_4: Tibia_l (0.028939 0.012632 0.010974)
      PathPoint default_5: Tibia_l (0.028708 0.0081514 0.011906)
      PathPoint default_6: Mid_Foot_l (0.11331 0.053955 0.020129)
      PathPoint default_7: Mid_Foot_l (0.12451 0.048207 0.023935)
      PathPoint default_8: Mid_Foot_l (0.13674 0.041179 0.028279)
      PathPoint default_9: Mid_Foot_l (0.15199 0.031399 0.031443)
      PathPoint default_10: Mid_Foot_l (0.15981 0.026399 0.034228)
      PathPoint default_11: Mid_Foot_l (0.17195 0.020461 0.035778)
      PathPoint default_12: Mid_Foot_l (0.17802 0.018889 0.0371)
      PathPoint default_13: Phal_l (0.22253 0.020185 0.035038)
    Thelen2003Muscle EXT_HAL_LONG_2_L: max_isometric_force=75.2333 optimal_fiber_length=0.06 tendon_slack_length=0.178
        pennation_angle_at_optimal=0.25133
      PathPoint default: Tibia_l (-0.0041814 0.19794 0.018918)
      PathPoint default_0: Tibia_l (0.024572 0.06236 0.013994)
      PathPoint default_1: Tibia_l (0.026093 0.042228 0.010928)
      PathPoint default_2: Tibia_l (0.027359 0.032484 0.011607)
      PathPoint default_3: Tibia_l (0.028567 0.021789 0.011985)
      PathPoint default_4: Tibia_l (0.028939 0.012632 0.010974)
      PathPoint default_5: Tibia_l (0.028708 0.0081514 0.011906)
      PathPoint default_6: Mid_Foot_l (0.11331 0.053955 0.020129)
      PathPoint default_7: Mid_Foot_l (0.12451 0.048207 0.023935)
      PathPoint default_8: Mid_Foot_l (0.13674 0.041179 0.028279)
      PathPoint default_9: Mid_Foot_l (0.15199 0.031399 0.031443)
      PathPoint default_10: Mid_Foot_l (0.15981 0.026399 0.034228)
      PathPoint default_11: Mid_Foot_l (0.17195 0.020461 0.035778)
      PathPoint default_12: Mid_Foot_l (0.17802 0.018889 0.0371)
      PathPoint default_13: Phal_l (0.22253 0.020185 0.035038)
    Thelen2003Muscle EXT_HAL_LONG_3_L: max_isometric_force=75.2333 optimal_fiber_length=0.06 tendon_slack_length=0.178
        pennation_angle_at_optimal=0.25133
      PathPoint default: Tibia_l (-0.0016256 0.25204 0.029735)
      PathPoint default_0: Tibia_l (0.024572 0.06236 0.013994)
      PathPoint default_1: Tibia_l (0.026093 0.042228 0.010928)
      PathPoint default_2: Tibia_l (0.027359 0.032484 0.011607)
      PathPoint default_3: Tibia_l (0.028567 0.021789 0.011985)
      PathPoint default_4: Tibia_l (0.028939 0.012632 0.010974)
      PathPoint default_5: Tibia_l (0.028708 0.0081514 0.011906)
      PathPoint default_6: Mid_Foot_l (0.11331 0.053955 0.020129)
      PathPoint default_7: Mid_Foot_l (0.12451 0.048207 0.023935)
      PathPoint default_8: Mid_Foot_l (0.13674 0.041179 0.028279)
      PathPoint default_9: Mid_Foot_l (0.15199 0.031399 0.031443)
      PathPoint default_10: Mid_Foot_l (0.15981 0.026399 0.034228)
      PathPoint default_11: Mid_Foot_l (0.17195 0.020461 0.035778)
      PathPoint default_12: Mid_Foot_l (0.17802 0.018889 0.0371)
      PathPoint default_13: Phal_l (0.22253 0.020185 0.035038)
    Thelen2003Muscle FLEX_DIG_LONG_1_L: max_isometric_force=81.4 optimal_fiber_length=0.038 tendon_slack_length=0.166
        pennation_angle_at_optimal=0.49742
      PathPoint default: Tibia_l (-0.0094086 0.24536 0.073073)
      PathPoint default_0: Tibia_l (-0.016079 0.024254 0.012792)
      PathPoint default_1: Tibia_l (-0.014539 0.010688 0.015548)
      PathPoint default_2: Tibia_l (-0.014885 0.0043032 0.01588)
      PathPoint default_3: Tibia_l (-0.015678 -0.0024607 0.017499)
      PathPoint default_4: Tibia_l (-0.013287 -0.0083106 0.018935)
      PathPoint default_5: Tibia_l (-0.013245 -0.015941 0.019812)
      PathPoint default_6: Tibia_l (-0.0089286 -0.034586 0.018151)
      PathPoint default_7: Tibia_l (-0.0069863 -0.03947 0.01661)
      PathPoint default_8: Phal_l (0.22058 0.0082703 -0.016378)
    Thelen2003Muscle FLEX_DIG_LONG_2_L: max_isometric_force=81.4 optimal_fiber_length=0.038 tendon_slack_length=0.166
        pennation_angle_at_optimal=0.49742
      PathPoint default: Tibia_l (-0.0080029 0.19296 0.063116)
      PathPoint default_0: Tibia_l (-0.016079 0.024254 0.012792)
      PathPoint default_1: Tibia_l (-0.014539 0.010688 0.015548)
      PathPoint default_2: Tibia_l (-0.014885 0.0043032 0.01588)
      PathPoint default_3: Tibia_l (-0.015678 -0.0024607 0.017499)
      PathPoint default_4: Tibia_l (-0.013287 -0.0083106 0.018935)
      PathPoint default_5: Tibia_l (-0.013245 -0.015941 0.019812)
      PathPoint default_6: Tibia_l (-0.0089286 -0.034586 0.018151)
      PathPoint default_7: Tibia_l (-0.0069863 -0.03947 0.01661)
      PathPoint default_8: Phal_l (0.22058 0.0082703 -0.016378)
    Thelen2003Muscle FLEX_DIG_LONG_3_L: max_isometric_force=81.4 optimal_fiber_length=0.038 tendon_slack_length=0.166
        pennation_angle_at_optimal=0.49742
      PathPoint default: Tibia_l (-0.008411 0.15393 0.050719)
      PathPoint default_0: Tibia_l (-0.016079 0.024254 0.012792)
      PathPoint default_1: Tibia_l (-0.014539 0.010688 0.015548)
      PathPoint default_2: Tibia_l (-0.014885 0.0043032 0.01588)
      PathPoint default_3: Tibia_l (-0.015678 -0.0024607 0.017499)
      PathPoint default_4: Tibia_l (-0.013287 -0.0083106 0.018935)
      PathPoint default_5: Tibia_l (-0.013245 -0.015941 0.019812)
      PathPoint default_6: Tibia_l (-0.0089286 -0.034586 0.018151)
      PathPoint default_7: Tibia_l (-0.0069863 -0.03947 0.01661)
      PathPoint default_8: Phal_l (0.22058 0.0082703 -0.016378)
    Thelen2003Muscle FLEX_HAL_LONG_1_L: max_isometric_force=383.5667 optimal_fiber_length=0.026
        tendon_slack_length=0.234 pennation_angle_at_optimal=0.52534
      PathPoint default: Tibia_l (-0.012204 0.22422 0.017737)
      PathPoint default_0: Tibia_l (-0.022195 0.014055 0.0030159)
      PathPoint default_1: Tibia_l (-0.021374 0.0039328 0.0049821)
      PathPoint default_2: Tibia_l (-0.021158 -0.00084167 0.006759)
      PathPoint default_3: Tibia_l (-0.021331 -0.0043704 0.0079911)
      PathPoint default_4: Tibia_l (-0.021834 -0.0057013 0.0089786)
      PathPoint default_5: Tibia_l (-0.022179 -0.012759 0.011443)
      PathPoint default_6: Tibia_l (-0.019185 -0.023957 0.013068)
      PathPoint default_7: Tibia_l (-0.016579 -0.033909 0.014149)
      PathPoint default_8: Phal_l (0.23346 0.010246 0.032347)
    Thelen2003Muscle FLEX_HAL_LONG_2_L: max_isometric_force=383.5667 optimal_fiber_length=0.026
        tendon_slack_length=0.234 pennation_angle_at_optimal=0.52534
      PathPoint default: Tibia_l (-0.011948 0.17104 0.0084723)
      PathPoint default_0: Tibia_l (-0.022195 0.014055 0.0030159)
      PathPoint default_1: Tibia_l (-0.021374 0.0039328 0.0049821)
      PathPoint default_2: Tibia_l (-0.021158 -0.00084167 0.006759)
      PathPoint default_3: Tibia_l (-0.021331 -0.0043704 0.0079911)
      PathPoint default_4: Tibia_l (-0.021834 -0.0057013 0.0089786)
      PathPoint default_5: Tibia_l (-0.022179 -0.012759 0.011443)
      PathPoint default_6: Tibia_l (-0.019185 -0.023957 0.013068)
      PathPoint default_7: Tibia_l (-0.016579 -0.033909 0.014149)
      PathPoint default_8: Phal_l (0.23346 0.010246 0.032347)
    Thelen2003Muscle FLEX_HAL_LONG_3_L: max_isometric_force=383.5667 optimal_fiber_length=0.026
        tendon_slack_length=0.234 pennation_angle_at_optimal=0.52534
      PathPoint default: Tibia_l (-0.011596 0.11654 -0.0013008)
      PathPoint default_0: Tibia_l (-0.022195 0.014055 0.0030159)
      PathPoint default_1: Tibia_l (-0.021374 0.0039328 0.0049821)
      PathPoint default_2: Tibia_l (-0.021158 -0.00084167 0.006759)
      PathPoint default_3: Tibia_l (-0.021331 -0.0043704 0.0079911)
      PathPoint default_4: Tibia_l (-0.021834 -0.0057013 0.0089786)
      PathPoint default_5: Tibia_l (-0.022179 -0.012759 0.011443)
      PathPoint default_6: Tibia_l (-0.019185 -0.023957 0.013068)
      PathPoint default_7: Tibia_l (-0.016579 -0.033909 0.014149)
      PathPoint default_8: Phal_l (0.23346 0.010246 0.032347)
    Thelen2003Muscle GASTR_LAT_1_L: max_isometric_force=888 optimal_fiber_length=0.057 tendon_slack_length=0.234
        pennation_angle_at_optimal=0.44331
      PathPoint default: Femur_l (-0.0112089 -0.395454 -0.0216264)
      PathPoint default_0: Hind_Foot_l (-0.0022439 0.0025115 -0.0069962)
      PathWrap: wrap_object=Wrap_Gastrocs_Plantaris_Posterior_L
    Thelen2003Muscle GASTR_MED_1_L: max_isometric_force=1620.6 optimal_fiber_length=0.06 tendon_slack_length=0.212
        pennation_angle_at_optimal=0.1885
      PathPoint default: Femur_l (-0.011545 -0.39769 0.02631)
      PathPoint default_0: Hind_Foot_l (-0.0026069 -0.0059098 -0.0042212)
      PathWrap: wrap_object=Wrap_Gastrocs_Plantaris_Posterior_L
    Thelen2003Muscle GEM_INF_1_L: max_isometric_force=151.7 optimal_fiber_length=0.034 tendon_slack_length=0
        pennation_angle_at_optimal=0
      PathPoint default: Pelvis (-0.065014 -0.040478 -0.0611)
      PathPoint default_0: Femur_l (-0.0093968 -0.0077203 -0.050586)
      PathWrap: wrap_object=Capsule1_L
    Thelen2003Muscle GEM_SUP_1_L: max_isometric_force=151.7 optimal_fiber_length=0.034 tendon_slack_length=0
        pennation_angle_at_optimal=0
      PathPoint default: Pelvis (-0.055597 0.0086185 -0.0395)
      PathPoint default_0: Femur_l (-0.0038187 -0.014661 -0.03985)
      PathWrap: wrap_object=Capsule1_L
    Thelen2003Muscle GLUT_MAX_SUP_1_L: max_isometric_force=306.4833 optimal_fiber_length=0.12 tendon_slack_length=0
        pennation_angle_at_optimal=0
      PathPoint default: Pelvis (-0.0791 0.0777 -0.074)
      PathPoint default_0: Femur_l (-0.0039138 -0.034375 -0.066102)
      PathWrap: wrap_object=Wrap2_Glut_Max_Pelvis_L method=hybrid
    Thelen2003Muscle GLUT_MAX_SUP_2_L: max_isometric_force=306.4833 optimal_fiber_length=0.12 tendon_slack_length=0
        pennation_angle_at_optimal=0
      PathPoint default: Pelvis (-0.0898 0.0551 -0.0551)
      PathPoint default_0: Femur_l (-0.0039138 -0.034375 -0.066102)
      PathWrap: wrap_object=Wrap2_Glut_Max_Pelvis_L method=hybrid
    Thelen2003Muscle GLUT_MAX_SUP_3_L: max_isometric_force=306.4833 optimal_fiber_length=0.12 tendon_slack_length=0
        pennation_angle_at_optimal=0
      PathPoint default: Pelvis (-0.0964 0.0273 -0.0396)
      PathPoint default_0: Femur_l (-0.0039138 -0.034375 -0.066102)
      PathWrap: wrap_object=Wrap2_Glut_Max_Pelvis_L method=hybrid
    Thelen2003Muscle GLUT_MAX_SUP_4_L: max_isometric_force=306.4833 optimal_fiber_length=0.12 tendon_slack_length=0
        pennation_angle_at_optimal=0
      PathPoint default: Pelvis (-0.0913 0.0891 -0.0629)
      PathPoint default_0: Femur_l (-0.013926 -0.032272 -0.069566)
      PathWrap: wrap_object=Wrap1_Glut_Max_Pelvis_L method=hybrid
    Thelen2003Muscle GLUT_MAX_SUP_5_L: max_isometric_force=306.4833 optimal_fiber_length=0.12 tendon_slack_length=0
        pennation_angle_at_optimal=0
      PathPoint default: Pelvis (-0.1033 0.0677 -0.0428)
      PathPoint default_0: Femur_l (-0.013926 -0.032272 -0.069566)
      PathWrap: wrap_object=Wrap1_Glut_Max_Pelvis_L method=hybrid
    Thelen2003Muscle GLUT_MAX_SUP_6_L: max_isometric_force=306.4833 optimal_fiber_length=0.12 tendon_slack_length=0
        pennation_angle_at_optimal=0
      PathPoint default: Pelvis (-0.1094 0.0394 -0.0278)
      PathPoint default_0: Femur_l (-0.013926 -0.032272 -0.069566)
      PathWrap: wrap_object=Wrap1_Glut_Max_Pelvis_L method=hybrid
    Thelen2003Muscle GLUT_MAX_INF_1_L: max_isometric_force=138.75 optimal_fiber_length=0.151 tendon_slack_length=0
        pennation_angle_at_optimal=0
      PathPoint default: Pelvis (-0.1074 -0.0082642 -0.0145)
      PathPoint default_0: Femur_l (-0.02562 -0.058351 -0.051243)
      PathWrap: wrap_object=Wrap1_Glut_Max_Femur_L method=hybrid
    Thelen2003Muscle GLUT_MAX_INF_2_L: max_isometric_force=138.75 optimal_fiber_length=0.151 tendon_slack_length=0
        pennation_angle_at_optimal=0
      PathPoint default: Pelvis (-0.098705 -0.014867 -0.0166)
      PathPoint default_0: Femur_l (-0.025595 -0.07554 -0.045587)
      PathWrap: wrap_object=Wrap1_Glut_Max_Femur_L method=hybrid
    Thelen2003Muscle GLUT_MAX_INF_3_L: max_isometric_force=138.75 optimal_fiber_length=0.151 tendon_slack_length=0
        pennation_angle_at_optimal=0
      PathPoint default: Pelvis (-0.090509 -0.02557 -0.0162)
      PathPoint default_0: Femur_l (-0.021838 -0.10355 -0.042971)
      PathWrap: wrap_object=Wrap1_Glut_Max_Femur_L method=hybrid
    Thelen2003Muscle GLUT_MAX_INF_4_L: max_isometric_force=138.75 optimal_fiber_length=0.151 tendon_slack_length=0
        pennation_angle_at_optimal=0
      PathPoint default: Pelvis (-0.1025 -0.0015658 -0.0211)
      PathPoint default_0: Femur_l (-0.02562 -0.058351 -0.051243)
      PathWrap: wrap_object=Wrap2_Glut_Max_Femur_L method=hybrid
    Thelen2003Muscle GLUT_MAX_INF_5_L: max_isometric_force=138.75 optimal_fiber_length=0.151 tendon_slack_length=0
        pennation_angle_at_optimal=0
      PathPoint default: Pelvis (-0.093803 -0.0081687 -0.0232)
      PathPoint default_0: Femur_l (-0.025595 -0.07554 -0.045587)
      PathWrap: wrap_object=Wrap2_Glut_Max_Femur_L method=hybrid
    Thelen2003Muscle GLUT_MAX_INF_6_L: max_isometric_force=138.75 optimal_fiber_length=0.151 tendon_slack_length=0
        pennation_angle_at_optimal=0
      PathPoint default: Pelvis (-0.086507 -0.019971 -0.0217)
      PathPoint default_0: Femur_l (-0.021838 -0.10355 -0.042971)
      PathWrap: wrap_object=Wrap2_Glut_Max_Femur_L method=hybrid
    Thelen2003Muscle GLUT_MED_ANT_1_L: max_isometric_force=233.7167 optimal_fiber_length=0.038 tendon_slack_length=0
        pennation_angle_at_optimal=0
      PathPoint default: Pelvis (0.0040316 0.094799 -0.1343)
      PathPoint default_0: Femur_l (-0.0081561 -0.0071639 -0.060687)
    Thelen2003Muscle GLUT_MED_ANT_2_L: max_isometric_force=233.7167 optimal_fiber_length=0.038 tendon_slack_length=0
        pennation_angle_at_optimal=0
      PathPoint default: Pelvis (0.01433 0.090295 -0.1353)
      PathPoint default_0: Femur_l (-0.003226 -0.0085244 -0.060254)
    Thelen2003Muscle GLUT_MED_ANT_3_L: max_isometric_force=233.7167 optimal_fiber_length=0.038 tendon_slack_length=0
        pennation_angle_at_optimal=0
      PathPoint default: Pelvis (0.024927 0.081892 -0.1323)
      PathPoint default_0: Femur_l (0.0018643 -0.010005 -0.056322)
    Thelen2003Muscle GLUT_MED_ANT_4_L: max_isometric_force=233.7167 optimal_fiber_length=0.038 tendon_slack_length=0
        pennation_angle_at_optimal=0
      PathPoint default: Pelvis (0.0093332 0.099497 -0.1419)
      PathPoint default_0: Femur_l (-0.0085045 -0.012093 -0.064912)
    Thelen2003Muscle GLUT_MED_ANT_5_L: max_isometric_force=233.7167 optimal_fiber_length=0.038 tendon_slack_length=0
        pennation_angle_at_optimal=0
      PathPoint default: Pelvis (0.018031 0.093594 -0.1406)
      PathPoint default_0: Femur_l (-0.0025645 -0.013503 -0.063562)
    Thelen2003Muscle GLUT_MED_ANT_6_L: max_isometric_force=233.7167 optimal_fiber_length=0.038 tendon_slack_length=0
        pennation_angle_at_optimal=0
      PathPoint default: Pelvis (0.028128 0.084691 -0.1369)
      PathPoint default_0: Femur_l (0.0016254 -0.016789 -0.061641)
    Thelen2003Muscle GLUT_MED_POST_1_L: max_isometric_force=374.9333 optimal_fiber_length=0.045
        tendon_slack_length=0.03 pennation_angle_at_optimal=0.27751
      PathPoint default: Pelvis (-0.03876 0.11871 -0.1148)
      PathPoint default_0: Femur_l (-0.018227 -0.0065459 -0.052979)
    Thelen2003Muscle GLUT_MED_POST_2_L: max_isometric_force=374.9333 optimal_fiber_length=0.045
        tendon_slack_length=0.03 pennation_angle_at_optimal=0.27751
      PathPoint default: Pelvis (-0.060166 0.10152 -0.0856)
      PathPoint default_0: Femur_l (-0.020818 -0.0080901 -0.051691)
    Thelen2003Muscle GLUT_MED_POST_3_L: max_isometric_force=374.9333 optimal_fiber_length=0.045
        tendon_slack_length=0.03 pennation_angle_at_optimal=0.27751
      PathPoint default: Pelvis (-0.068176 0.072123 -0.0666)
      PathPoint default_0: Femur_l (-0.02297 -0.010108 -0.051078)
    Thelen2003Muscle GLUT_MED_POST_4_L: max_isometric_force=374.9333 optimal_fiber_length=0.045
        tendon_slack_length=0.03 pennation_angle_at_optimal=0.27751
      PathPoint default: Pelvis (-0.048055 0.13462 -0.1104)
      PathPoint default_0: Femur_l (-0.018227 -0.0065459 -0.052979)
    Thelen2003Muscle GLUT_MED_POST_5_L: max_isometric_force=374.9333 optimal_fiber_length=0.045
        tendon_slack_length=0.03 pennation_angle_at_optimal=0.27751
      PathPoint default: Pelvis (-0.073359 0.12412 -0.0794)
      PathPoint default_0: Femur_l (-0.018277 -0.0085204 -0.058951)
    Thelen2003Muscle GLUT_MED_POST_6_L: max_isometric_force=374.9333 optimal_fiber_length=0.045
        tendon_slack_length=0.03 pennation_angle_at_optimal=0.27751
      PathPoint default: Pelvis (-0.084067 0.099328 -0.0591)
      PathPoint default_0: Femur_l (-0.022433 -0.0098621 -0.057034)
    Thelen2003Muscle GLUT_MIN_ANT_1_L: max_isometric_force=370 optimal_fiber_length=0.028 tendon_slack_length=0.073
        pennation_angle_at_optimal=0
      PathPoint default: Pelvis (-0.00077369 0.0789 -0.1228)
      PathPoint default_0: Femur_l (0.0021563 -0.02124 -0.060605)
    Thelen2003Muscle GLUT_MIN_MID_1_L: max_isometric_force=299.7 optimal_fiber_length=0.034 tendon_slack_length=0.073
        pennation_angle_at_optimal=0
      PathPoint default: Pelvis (-0.022575 0.075508 -0.107)
      PathPoint default_0: Femur_l (0.0021563 -0.02124 -0.060605)
    Thelen2003Muscle GLUT_MIN_POST_1_L: max_isometric_force=273.8 optimal_fiber_length=0.037 tendon_slack_length=0.073
        pennation_angle_at_optimal=0
      PathPoint default: Pelvis (-0.040278 0.065113 -0.0904)
      PathPoint default_0: Femur_l (0.0021563 -0.02124 -0.060605)
    Thelen2003Muscle GRACILIS_1_L: max_isometric_force=90.65 optimal_fiber_length=0.181 tendon_slack_length=0.14
        pennation_angle_at_optimal=0
      PathPoint default: Pelvis (0.016484 -0.048805 -0.0158)
      PathPoint default_0: Tibia_l (-0.041175 0.34691 0.11688)
      PathPoint default_1: Tibia_l (-0.034883 0.33921 0.11679)
      PathPoint default_2: Tibia_l (-0.034436 0.33891 0.11764)
      PathPoint default_3: Tibia_l (-0.029639 0.3358 0.11993)
      PathPoint default_4: Tibia_l (-0.02329 0.32971 0.11801)
      PathPoint default_5: Tibia_l (-0.022843 0.32942 0.11886)
      PathPoint default_6: Tibia_l (-0.011079 0.32413 0.11671)
      PathPoint default_7: Tibia_l (0.00035445 0.32103 0.11432)
      PathPoint default_8: Tibia_l (-0.0045077 0.30526 0.10668)
    Thelen2003Muscle GRACILIS_2_L: max_isometric_force=90.65 optimal_fiber_length=0.181 tendon_slack_length=0.14
        pennation_angle_at_optimal=0
      PathPoint default: Pelvis (0.036688 -0.034612 -0.0099)
      PathPoint default_0: Tibia_l (-0.041175 0.34691 0.11688)
      PathPoint default_1: Tibia_l (-0.034883 0.33921 0.11679)
      PathPoint default_2: Tibia_l (-0.034436 0.33891 0.11764)
      PathPoint default_3: Tibia_l (-0.029639 0.3358 0.11993)
      PathPoint default_4: Tibia_l (-0.02329 0.32971 0.11801)
      PathPoint default_5: Tibia_l (-0.022843 0.32942 0.11886)
      PathPoint default_6: Tibia_l (-0.011079 0.32413 0.11671)
      PathPoint default_7: Tibia_l (0.00035445 0.32103 0.11432)
      PathPoint default_8: Tibia_l (-0.0045077 0.30526 0.10668)
    Thelen2003Muscle ILIACUS_LAT_1_L: max_isometric_force=81.4 optimal_fiber_length=0.103 tendon_slack_length=0.113
        pennation_angle_at_optimal=0.46251
      PathPoint default: Pelvis (-0.029456 0.13231 -0.1172)
      PathPoint default_0: Pelvis (0.023011 0.031992 -0.0787)
      PathPoint default_1: Femur_l (-0.029238 -0.055155 -0.020486)
      PathWrap: wrap_object=WrapPelvis_L
    Thelen2003Muscle ILIACUS_LAT_2_L: max_isometric_force=81.4 optimal_fiber_length=0.103 tendon_slack_length=0.113
        pennation_angle_at_optimal=0.46251
      PathPoint default: Pelvis (-0.011262 0.1148 -0.1189)
      PathPoint default_0: Pelvis (0.023011 0.031992 -0.0787)
      PathPoint default_1: Femur_l (-0.029238 -0.055155 -0.020486)
      PathWrap: wrap_object=WrapPelvis_L
    Thelen2003Muscle ILIACUS_LAT_3_L: max_isometric_force=81.4 optimal_fiber_length=0.103 tendon_slack_length=0.113
        pennation_angle_at_optimal=0.46251
      PathPoint default: Pelvis (-0.0033666 0.1001 -0.1175)
      PathPoint default_0: Pelvis (0.023011 0.031992 -0.0787)
      PathPoint default_1: Femur_l (-0.029238 -0.055155 -0.020486)
      PathWrap: wrap_object=WrapPelvis_L
    Thelen2003Muscle ILIACUS_MID_1_L: max_isometric_force=160.3333 optimal_fiber_length=0.052 tendon_slack_length=0.113
        pennation_angle_at_optimal=0
      PathPoint default: Pelvis (-0.055755 0.13542 -0.09)
      PathPoint default_0: Pelvis (0.023011 0.031992 -0.0787)
      PathPoint default_1: Femur_l (-0.029238 -0.055155 -0.020486)
      PathWrap: wrap_object=WrapPelvis_L
    Thelen2003Muscle ILIACUS_MID_2_L: max_isometric_force=160.3333 optimal_fiber_length=0.052 tendon_slack_length=0.113
        pennation_angle_at_optimal=0
      PathPoint default: Pelvis (-0.043163 0.11031 -0.0876)
      PathPoint default_0: Pelvis (0.023011 0.031992 -0.0787)
      PathPoint default_1: Femur_l (-0.029238 -0.055155 -0.020486)
      PathWrap: wrap_object=WrapPelvis_L
    Thelen2003Muscle ILIACUS_MID_3_L: max_isometric_force=160.3333 optimal_fiber_length=0.052 tendon_slack_length=0.113
        pennation_angle_at_optimal=0
      PathPoint default: Pelvis (-0.030771 0.08611 -0.0859)
      PathPoint default_0: Pelvis (0.023011 0.031992 -0.0787)
      PathPoint default_1: Femur_l (-0.029238 -0.055155 -0.020486)
      PathWrap: wrap_object=WrapPelvis_L
    Thelen2003Muscle ILIACUS_MED_1_L: max_isometric_force=93.7333 optimal_fiber_length=0.089 tendon_slack_length=0.155
        pennation_angle_at_optimal=0
      PathPoint default: Pelvis (-0.052657 0.12752 -0.0507)
      PathPoint default_0: Pelvis (0.023011 0.031992 -0.0787)
      PathPoint default_1: Femur_l (-0.029238 -0.055155 -0.020486)
      PathWrap: wrap_object=WrapPelvis_L
    Thelen2003Muscle ILIACUS_MED_2_L: max_isometric_force=93.7333 optimal_fiber_length=0.089 tendon_slack_length=0.155
        pennation_angle_at_optimal=0
      PathPoint default: Pelvis (-0.046664 0.10772 -0.0546)
      PathPoint default_0: Pelvis (0.023011 0.031992 -0.0787)
      PathPoint default_1: Femur_l (-0.029238 -0.055155 -0.020486)
      PathWrap: wrap_object=WrapPelvis_L
    Thelen2003Muscle ILIACUS_MED_3_L: max_isometric_force=93.7333 optimal_fiber_length=0.089 tendon_slack_length=0.155
        pennation_angle_at_optimal=0
      PathPoint default: Pelvis (-0.036773 0.081312 -0.0536)
      PathPoint default_0: Pelvis (0.023011 0.031992 -0.0787)
      PathPoint default_1: Femur_l (-0.029238 -0.055155 -0.020486)
      PathWrap: wrap_object=WrapPelvis_L
    Thelen2003Muscle OBT_EXT_SUP_1_L: max_isometric_force=303.4 optimal_fiber_length=0.028 tendon_slack_length=0.03
        pennation_angle_at_optimal=0
      PathPoint default: Pelvis (0.038794 -0.017713 -0.0095)
      PathPoint default_0: Femur_l (-0.014005 -0.030988 -0.01283)
      PathPoint default_1: Femur_l (-0.019078 -0.02597 -0.037227)
    Thelen2003Muscle OBT_EXT_SUP_2_L: max_isometric_force=303.4 optimal_fiber_length=0.028 tendon_slack_length=0.03
        pennation_angle_at_optimal=0
      PathPoint default: Pelvis (0.021089 -0.032607 -0.0125)
      PathPoint default_0: Femur_l (-0.014005 -0.030988 -0.01283)
      PathPoint default_1: Femur_l (-0.019078 -0.02597 -0.037227)
    Thelen2003Muscle OBT_EXT_SUP_3_L: max_isometric_force=303.4 optimal_fiber_length=0.028 tendon_slack_length=0.03
        pennation_angle_at_optimal=0
      PathPoint default: Pelvis (-0.00041444 -0.0433 -0.021)
      PathPoint default_0: Femur_l (-0.014005 -0.030988 -0.01283)
      PathPoint default_1: Femur_l (-0.019078 -0.02597 -0.037227)
    Thelen2003Muscle OBT_INT_1_L: max_isometric_force=313.2667 optimal_fiber_length=0.021 tendon_slack_length=0.082
        pennation_angle_at_optimal=0
      PathPoint default: Pelvis (-0.022193 0.021907 -0.0478)
      PathPoint default_0: Pelvis (-0.057008 -0.024981 -0.0467)
      PathPoint default_1: Femur_l (-0.0056759 -0.011965 -0.047147)
    Thelen2003Muscle OBT_INT_2_L: max_isometric_force=313.2667 optimal_fiber_length=0.021 tendon_slack_length=0.082
        pennation_angle_at_optimal=0
      PathPoint default: Pelvis (-0.019799 0.0035066 -0.0405)
      PathPoint default_0: Pelvis (-0.057008 -0.024981 -0.0467)
      PathPoint default_1: Femur_l (-0.0056759 -0.011965 -0.047147)
    Thelen2003Muscle OBT_INT_3_L: max_isometric_force=313.2667 optimal_fiber_length=0.021 tendon_slack_length=0.082
        pennation_angle_at_optimal=0
      PathPoint default: Pelvis (-0.0093043 -0.012797 -0.0307)
      PathPoint default_0: Pelvis (-0.057008 -0.024981 -0.0467)
      PathPoint default_1: Femur_l (-0.0056759 -0.011965 -0.047147)
    Thelen2003Muscle PECTINEUS_1_L: max_isometric_force=62.9 optimal_fiber_length=0.115 tendon_slack_length=0
        pennation_angle_at_optimal=0
      PathPoint default: Pelvis (0.034705 0.013788 -0.0384)
      PathPoint default_0: Femur_l (-0.023315 -0.078709 -0.028342)
    Thelen2003Muscle PECTINEUS_2_L: max_isometric_force=62.9 optimal_fiber_length=0.115 tendon_slack_length=0
        pennation_angle_at_optimal=0
      PathPoint default: Pelvis (0.039703 0.010287 -0.0349)
      PathPoint default_0: Femur_l (-0.021682 -0.086094 -0.029167)
    Thelen2003Muscle PECTINEUS_3_L: max_isometric_force=62.9 optimal_fiber_length=0.115 tendon_slack_length=0
        pennation_angle_at_optimal=0
      PathPoint default: Pelvis (0.044702 0.0066851 -0.0314)
      PathPoint default_0: Femur_l (-0.019107 -0.0977 -0.027301)
    Thelen2003Muscle PECTINEUS_4_L: max_isometric_force=62.9 optimal_fiber_length=0.115 tendon_slack_length=0
        pennation_angle_at_optimal=0
      PathPoint default: Pelvis (0.049701 0.0031834 -0.0279)
      PathPoint default_0: Femur_l (-0.023315 -0.078709 -0.028342)
    Thelen2003Muscle PERONEUS_BREV_1_L: max_isometric_force=234.3333 optimal_fiber_length=0.027
        tendon_slack_length=0.064 pennation_angle_at_optimal=0.40317
      PathPoint default: Tibia_l (-0.0066762 0.20514 0.012561)
      PathPoint default_0: Tibia_l (-0.012841 0.043444 -0.01539)
      PathPoint default_1: Tibia_l (-0.012372 0.028954 -0.01949)
      PathPoint default_2: Tibia_l (-0.011298 0.0091156 -0.023401)
      PathPoint default_3: Tibia_l (-0.0083627 -0.0023618 -0.024208)
      PathPoint default_4: Mid_Foot_l (0.095866 0.017466 -0.037295)
    Thelen2003Muscle PERONEUS_BREV_2_L: max_isometric_force=234.3333 optimal_fiber_length=0.027
        tendon_slack_length=0.064 pennation_angle_at_optimal=0.40317
      PathPoint default: Tibia_l (-0.007724 0.15901 0.003833)
      PathPoint default_0: Tibia_l (-0.012841 0.043444 -0.01539)
      PathPoint default_1: Tibia_l (-0.012372 0.028954 -0.01949)
      PathPoint default_2: Tibia_l (-0.011298 0.0091156 -0.023401)
      PathPoint default_3: Tibia_l (-0.0083627 -0.0023618 -0.024208)
      PathPoint default_4: Mid_Foot_l (0.095866 0.017466 -0.037295)
    Thelen2003Muscle PERONEUS_BREV_3_L: max_isometric_force=234.3333 optimal_fiber_length=0.027
        tendon_slack_length=0.064 pennation_angle_at_optimal=0.40317
      PathPoint default: Tibia_l (-0.0080984 0.11429 -0.0041694)
      PathPoint default_0: Tibia_l (-0.012841 0.043444 -0.01539)
      PathPoint default_1: Tibia_l (-0.012372 0.028954 -0.01949)
      PathPoint default_2: Tibia_l (-0.011298 0.0091156 -0.023401)
      PathPoint default_3: Tibia_l (-0.0083627 -0.0023618 -0.024208)
      PathPoint default_4: Mid_Foot_l (0.095866 0.017466 -0.037295)
    Thelen2003Muscle PERONEUS_LONG_1_L: max_isometric_force=294.7667 optimal_fiber_length=0.034
        tendon_slack_length=0.159 pennation_angle_at_optimal=0.27576
      PathPoint default: Tibia_l (0.0020645 0.3183 0.036371)
      PathPoint default_0: Tibia_l (-0.012841 0.043444 -0.01539)
      PathPoint default_1: Tibia_l (-0.012372 0.028954 -0.01949)
      PathPoint default_2: Tibia_l (-0.011298 0.0091156 -0.023401)
      PathPoint default_3: Tibia_l (-0.0083627 -0.0023618 -0.024208)
      PathPoint default_4: Mid_Foot_l (0.077953 0.027643 -0.026748)
    Thelen2003Muscle PERONEUS_LONG_2_L: max_isometric_force=294.7667 optimal_fiber_length=0.034
        tendon_slack_length=0.159 pennation_angle_at_optimal=0.27576
      PathPoint default: Tibia_l (-0.0022011 0.28172 0.028638)
      PathPoint default_0: Tibia_l (-0.012841 0.043444 -0.01539)
      PathPoint default_1: Tibia_l (-0.012372 0.028954 -0.01949)
      PathPoint default_2: Tibia_l (-0.011298 0.0091156 -0.023401)
      PathPoint default_3: Tibia_l (-0.0083627 -0.0023618 -0.024208)
      PathPoint default_4: Mid_Foot_l (0.077953 0.027643 -0.026748)
    Thelen2003Muscle PERONEUS_LONG_3_L: max_isometric_force=294.7667 optimal_fiber_length=0.034
        tendon_slack_length=0.159 pennation_angle_at_optimal=0.27576
      PathPoint default: Tibia_l (-0.0061309 0.24545 0.02119)
      PathPoint default_0: Tibia_l (-0.012841 0.043444 -0.01539)
      PathPoint default_1: Tibia_l (-0.012372 0.028954 -0.01949)
      PathPoint default_2: Tibia_l (-0.011298 0.0091156 -0.023401)
      PathPoint default_3: Tibia_l (-0.0083627 -0.0023618 -0.024208)
      PathPoint default_4: Mid_Foot_l (0.077953 0.027643 -0.026748)
    Thelen2003Muscle PERONEUS_TERT_1_L: max_isometric_force=76.4667 optimal_fiber_length=0.043 tendon_slack_length=0.1
        pennation_angle_at_optimal=0.33336
      PathPoint default: Tibia_l (-0.0021568 0.12323 0.002303)
      PathPoint default_0: Tibia_l (0.021369 0.035462 -0.0066759)
      PathPoint default_1: Tibia_l (0.023567 0.019517 -0.0098287)
      PathPoint default_2: Tibia_l (0.026818 -0.002741 -0.0098149)
      PathPoint default_3: Mid_Foot_l (0.14239 0.013268 -0.032515)
    Thelen2003Muscle PERONEUS_TERT_2_L: max_isometric_force=76.4667 optimal_fiber_length=0.043 tendon_slack_length=0.1
        pennation_angle_at_optimal=0.33336
      PathPoint default: Tibia_l (-0.0026225 0.17407 0.012048)
      PathPoint default_0: Tibia_l (0.021369 0.035462 -0.0066759)
      PathPoint default_1: Tibia_l (0.023567 0.019517 -0.0098287)
      PathPoint default_2: Tibia_l (0.026818 -0.002741 -0.0098149)
      PathPoint default_3: Mid_Foot_l (0.14239 0.013268 -0.032515)
    Thelen2003Muscle PERONEUS_TERT_3_L: max_isometric_force=76.4667 optimal_fiber_length=0.043 tendon_slack_length=0.1
        pennation_angle_at_optimal=0.33336
      PathPoint default: Tibia_l (-0.0023228 0.22464 0.022832)
      PathPoint default_0: Tibia_l (0.021369 0.035462 -0.0066759)
      PathPoint default_1: Tibia_l (0.023567 0.019517 -0.0098287)
      PathPoint default_2: Tibia_l (0.026818 -0.002741 -0.0098149)
      PathPoint default_3: Mid_Foot_l (0.14239 0.013268 -0.032515)
    Thelen2003Muscle PIRIFORME_1_L: max_isometric_force=299.7 optimal_fiber_length=0.039 tendon_slack_length=0.016
        pennation_angle_at_optimal=0
      PathPoint default: Pelvis (-0.10069 0.023134 -0.0155)
      PathPoint default_0: Femur_l (-0.015321 -0.0063387 -0.051708)
    Thelen2003Muscle PLANTARIS_1_L: max_isometric_force=88.8 optimal_fiber_length=0.048 tendon_slack_length=0.35
        pennation_angle_at_optimal=0
      PathPoint default: Femur_l (-0.0071857 -0.39015 -0.021173)
      PathPoint default_0: Hind_Foot_l (0.0037122 0.0027372 0.009603)
      PathWrap: wrap_object=Wrap_Gastrocs_Plantaris_Posterior_L
    Thelen2003Muscle POPLITEUS_1_L: max_isometric_force=197.95 optimal_fiber_length=0.024 tendon_slack_length=0.01
        pennation_angle_at_optimal=0
      PathPoint default: Femur_l (-0.014604 -0.423862 -0.0361972)
      PathPoint default_0: Tibia_l (-0.0072365 0.35395 0.064684)
      PathPoint default_1: Tibia_l (-0.012028 0.28096 0.084581)
    Thelen2003Muscle POPLITEUS_2_L: max_isometric_force=197.95 optimal_fiber_length=0.024 tendon_slack_length=0.01
        pennation_angle_at_optimal=0
      PathPoint default: Femur_l (-0.014604 -0.423862 -0.0361972)
      PathPoint default_0: Tibia_l (-0.0072365 0.35395 0.064684)
      PathPoint default_1: Tibia_l (-0.019478 0.32343 0.087895)
    Thelen2003Muscle PSOAS_MAJ_1_L: max_isometric_force=240.5 optimal_fiber_length=0.099 tendon_slack_length=0.113
        pennation_angle_at_optimal=0.23387
      PathPoint default: Pelvis (-0.057325 0.22642 -0.0341)
      PathPoint default_0: Pelvis (0.023011 0.031992 -0.0787)
      PathPoint default_1: Femur_l (-0.029238 -0.055155 -0.020486)
      PathWrap: wrap_object=WrapPelvis_L
    Thelen2003Muscle PSOAS_MAJ_2_L: max_isometric_force=240.5 optimal_fiber_length=0.099 tendon_slack_length=0.113
        pennation_angle_at_optimal=0.23387
      PathPoint default: Pelvis (-0.029039 0.18441 -0.0301)
      PathPoint default_0: Pelvis (0.023011 0.031992 -0.0787)
      PathPoint default_1: Femur_l (-0.029238 -0.055155 -0.020486)
      PathWrap: wrap_object=WrapPelvis_L
    Thelen2003Muscle PSOAS_MAJ_3_L: max_isometric_force=240.5 optimal_fiber_length=0.099 tendon_slack_length=0.113
        pennation_angle_at_optimal=0.23387
      PathPoint default: Pelvis (-0.028053 0.14201 -0.0309)
      PathPoint default_0: Pelvis (0.023011 0.031992 -0.0787)
      PathPoint default_1: Femur_l (-0.029238 -0.055155 -0.020486)
      PathWrap: wrap_object=WrapPelvis_L
    Thelen2003Muscle QUAD_FEM_1_L: max_isometric_force=135.05 optimal_fiber_length=0.034 tendon_slack_length=0
        pennation_angle_at_optimal=0
      PathPoint default: Pelvis (-0.0090166 -0.049797 -0.0267)
      PathPoint default_0: Femur_l (-0.025108 -0.022992 -0.042636)
    Thelen2003Muscle QUAD_FEM_2_L: max_isometric_force=135.05 optimal_fiber_length=0.034 tendon_slack_length=0
        pennation_angle_at_optimal=0
      PathPoint default: Pelvis (-0.015417 -0.052395 -0.0347)
      PathPoint default_0: Femur_l (-0.030235 -0.031262 -0.041798)
    Thelen2003Muscle QUAD_FEM_3_L: max_isometric_force=135.05 optimal_fiber_length=0.034 tendon_slack_length=0
        pennation_angle_at_optimal=0
      PathPoint default: Pelvis (-0.021718 -0.054993 -0.0428)
      PathPoint default_0: Femur_l (-0.030046 -0.039604 -0.042819)
    Thelen2003Muscle QUAD_FEM_4_L: max_isometric_force=135.05 optimal_fiber_length=0.034 tendon_slack_length=0
        pennation_angle_at_optimal=0
      PathPoint default: Pelvis (-0.028019 -0.057591 -0.0508)
      PathPoint default_0: Femur_l (-0.028333 -0.049438 -0.042284)
    Thelen2003Muscle RECTUS_FEM_1_L: max_isometric_force=534.65 optimal_fiber_length=0.078 tendon_slack_length=0.096
        pennation_angle_at_optimal=0.38397
      PathPoint default: Pelvis (0.030214 0.04269 -0.11)
      PathPoint default_0: Patella_l (0 0 0)
      PathWrap: wrap_object=Wrap_Quadriceps_Anterior_L
    Thelen2003Muscle RECTUS_FEM_2_L: max_isometric_force=534.65 optimal_fiber_length=0.078 tendon_slack_length=0.096
        pennation_angle_at_optimal=0.38397
      PathPoint default: Pelvis (0.030214 0.04269 -0.11)
      PathPoint default_0: Patella_l (-0.006 0.0003 -0.01)
      PathWrap: wrap_object=Wrap_Quadriceps_Anterior_L
    Thelen2003Muscle SARTORIUS_PROS_1_L: max_isometric_force=218.3 optimal_fiber_length=0.347 tendon_slack_length=0.079
        pennation_angle_at_optimal=0
      PathPoint default: Pelvis (0.032 0.0749 -0.1247)
      PathPoint default_0: Femur_l (0.028405 -0.10782 0.030033)
      PathPoint default_1: Femur_l (0.033643 -0.19407 0.023041)
      PathPoint default_2: Femur_l (0.029641 -0.20373 0.025803)
      PathPoint default_3: Femur_l (0.025412 -0.21845 0.029731)
      PathPoint default_4: Femur_l (0.019061 -0.22881 0.03245)
      PathPoint default_5: Femur_l (0.011564 -0.24101 0.034648)
      PathPoint default_6: Femur_l (0.0059646 -0.25249 0.037782)
      PathPoint default_7: Femur_l (0.0015851 -0.26505 0.038204)
      PathPoint default_8: Femur_l (-0.0033767 -0.27857 0.039482)
      PathPoint default_9: Femur_l (-0.0062537 -0.29337 0.040732)
      PathPoint default_10: Femur_l (-0.0082477 -0.30831 0.042433)
      PathPoint default_11: Femur_l (-0.011575 -0.32309 0.044575)
      PathPoint default_12: Femur_l (-0.01197 -0.32606 0.044468)
      PathPoint default_13: Tibia_l (-0.0021977 0.30883 0.10954)
    Thelen2003Muscle SARTORIUS_DIST_1_L: max_isometric_force=218.3 optimal_fiber_length=0.347 tendon_slack_length=0.079
        pennation_angle_at_optimal=0
      PathPoint default: Pelvis (0.032 0.0749 -0.1247)
      PathPoint default_0: Femur_l (-0.041568 -0.37235 0.03769)
      PathPoint default_1: Tibia_l (-0.0021977 0.30883 0.10954)
    Thelen2003Muscle SEMIMEMB_1_L: max_isometric_force=632.7 optimal_fiber_length=0.081 tendon_slack_length=0.157
        pennation_angle_at_optimal=0.43633
      PathPoint default: Pelvis (-0.028022 -0.066091 -0.0694)
      PathPoint default_0: Tibia_l (-0.046927 0.35414 0.10374)
    Thelen2003Muscle SEMITEND_1_L: max_isometric_force=543.9 optimal_fiber_length=0.142 tendon_slack_length=0.237
        pennation_angle_at_optimal=0
      PathPoint default: Pelvis (-0.04032 -0.060687 -0.0619)
      PathPoint default_0: Tibia_l (-0.051558 0.36102 0.094139)
      PathPoint default_1: Tibia_l (-0.05107 0.35377 0.093728)
      PathPoint default_2: Tibia_l (-0.046116 0.34559 0.095369)
      PathPoint default_3: Tibia_l (-0.039881 0.33626 0.097112)
      PathPoint default_4: Tibia_l (-0.034811 0.33 0.099353)
      PathPoint default_5: Tibia_l (-0.031469 0.32518 0.10065)
      PathPoint default_6: Tibia_l (-0.028245 0.31914 0.099208)
      PathPoint default_7: Tibia_l (-0.011861 0.29547 0.10149)
    Thelen2003Muscle SOLEUS_MED_1_L: max_isometric_force=1163.033 optimal_fiber_length=0.024 tendon_slack_length=0.085
        pennation_angle_at_optimal=1.1257
      PathPoint default: Tibia_l (-0.0057664 0.21128 0.073862)
      PathPoint default_0: Hind_Foot_l (0.0022401 -0.0022888 0.0069759)
    Thelen2003Muscle SOLEUS_MED_2_L: max_isometric_force=1163.033 optimal_fiber_length=0.024 tendon_slack_length=0.085
        pennation_angle_at_optimal=1.1257
      PathPoint default: Tibia_l (-0.0079648 0.24221 0.0808)
      PathPoint default_0: Hind_Foot_l (0.0022401 -0.0022888 0.0069759)
    Thelen2003Muscle SOLEUS_MED_3_L: max_isometric_force=1163.033 optimal_fiber_length=0.024 tendon_slack_length=0.085
        pennation_angle_at_optimal=1.1257
      PathPoint default: Tibia_l (-0.012401 0.26727 0.083452)
      PathPoint default_0: Hind_Foot_l (0.0022401 -0.0022888 0.0069759)
    Thelen2003Muscle SOLEUS_LAT_1_L: max_isometric_force=1059.433 optimal_fiber_length=0.026 tendon_slack_length=0.085
        pennation_angle_at_optimal=1.0245
      PathPoint default: Tibia_l (-0.011784 0.26516 0.027364)
      PathPoint default_0: Hind_Foot_l (-0.0022439 0.0025115 -0.0069962)
    Thelen2003Muscle SOLEUS_LAT_2_L: max_isometric_force=1059.433 optimal_fiber_length=0.026 tendon_slack_length=0.085
        pennation_angle_at_optimal=1.0245
      PathPoint default: Tibia_l (-0.010321 0.29161 0.032466)
      PathPoint default_0: Hind_Foot_l (-0.0022439 0.0025115 -0.0069962)
    Thelen2003Muscle SOLEUS_LAT_3_L: max_isometric_force=1059.433 optimal_fiber_length=0.026 tendon_slack_length=0.085
        pennation_angle_at_optimal=1.0245
      PathPoint default: Tibia_l (-0.0093066 0.33074 0.038424)
      PathPoint default_0: Hind_Foot_l (-0.0022439 0.0025115 -0.0069962)
    Thelen2003Muscle TENS_FASC_L_1_L: max_isometric_force=162.8 optimal_fiber_length=0.095 tendon_slack_length=0
        pennation_angle_at_optimal=0
      PathPoint default: Pelvis (0.028327 0.079891 -0.1373)
      PathPoint default_0: Tibia_l (0.033382 0.41037 0.087417)
    Thelen2003Muscle TENS_FASC_L_2_L: max_isometric_force=162.8 optimal_fiber_length=0.095 tendon_slack_length=0
        pennation_angle_at_optimal=0
      PathPoint default: Pelvis (0.02373 0.090092 -0.141)
      PathPoint default_0: Tibia_l (0.033382 0.41037 0.087417)
    Thelen2003Muscle TIBIALIS_ANT_1_L: max_isometric_force=328.0667 optimal_fiber_length=0.046
        tendon_slack_length=0.235 pennation_angle_at_optimal=0.16755
      PathPoint default: Tibia_l (0.023401 0.32867 0.077325)
      PathPoint default_0: Tibia_l (0.019989 0.010671 0.042247)
      PathPoint default_1: Mid_Foot_l (0.10772 0.034187 0.035879)
      PathPoint default_2: Mid_Foot_l (0.12259 0.018622 0.033789)
    Thelen2003Muscle TIBIALIS_ANT_2_L: max_isometric_force=328.0667 optimal_fiber_length=0.046
        tendon_slack_length=0.235 pennation_angle_at_optimal=0.16755
      PathPoint default: Tibia_l (0.021119 0.30085 0.07573)
      PathPoint default_0: Tibia_l (0.019989 0.010671 0.042247)
      PathPoint default_1: Mid_Foot_l (0.10772 0.034187 0.035879)
      PathPoint default_2: Mid_Foot_l (0.12259 0.018622 0.033789)
    Thelen2003Muscle TIBIALIS_ANT_3_L: max_isometric_force=328.0667 optimal_fiber_length=0.046
        tendon_slack_length=0.235 pennation_angle_at_optimal=0.16755
      PathPoint default: Tibia_l (0.009666 0.24971 0.064256)
      PathPoint default_0: Tibia_l (0.019989 0.010671 0.042247)
      PathPoint default_1: Mid_Foot_l (0.10772 0.034187 0.035879)
      PathPoint default_2: Mid_Foot_l (0.12259 0.018622 0.033789)
    Thelen2003Muscle TIBIALIS_POST_MED_1_L: max_isometric_force=266.4 optimal_fiber_length=0.024
        tendon_slack_length=0.11 pennation_angle_at_optimal=0.43982
      PathPoint default: Tibia_l (-9.4398e-5 0.29664 0.069868)
      PathPoint default_0: Tibia_l (-0.012032 0.061558 0.023613)
      PathPoint default_1: Tibia_l (-0.011832 0.048872 0.023834)
      PathPoint default_2: Tibia_l (-0.012798 0.039252 0.024552)
      PathPoint default_3: Tibia_l (-0.014154 0.030878 0.024726)
      PathPoint default_4: Tibia_l (-0.014889 0.025738 0.024513)
      PathPoint default_5: Tibia_l (-0.016071 0.02022 0.025588)
      PathPoint default_6: Tibia_l (-0.01502 0.014579 0.026622)
      PathPoint default_7: Tibia_l (-0.014358 0.010183 0.027111)
      PathPoint default_8: Tibia_l (-0.013868 0.0022584 0.028833)
      PathPoint default_9: Tibia_l (-0.0093018 -0.0053392 0.032061)
      PathPoint default_10: Tibia_l (0.0011085 -0.019678 0.032223)
      PathPoint default_11: Mid_Foot_l (0.07635 0.031177 0.031438)
    Thelen2003Muscle TIBIALIS_POST_MED_2_L: max_isometric_force=266.4 optimal_fiber_length=0.024
        tendon_slack_length=0.11 pennation_angle_at_optimal=0.43982
      PathPoint default: Tibia_l (-0.0024854 0.2492 0.060213)
      PathPoint default_0: Tibia_l (-0.012032 0.061558 0.023613)
      PathPoint default_1: Tibia_l (-0.011832 0.048872 0.023834)
      PathPoint default_2: Tibia_l (-0.012798 0.039252 0.024552)
      PathPoint default_3: Tibia_l (-0.014154 0.030878 0.024726)
      PathPoint default_4: Tibia_l (-0.014889 0.025738 0.024513)
      PathPoint default_5: Tibia_l (-0.016071 0.02022 0.025588)
      PathPoint default_6: Tibia_l (-0.01502 0.014579 0.026622)
      PathPoint default_7: Tibia_l (-0.014358 0.010183 0.027111)
      PathPoint default_8: Tibia_l (-0.013868 0.0022584 0.028833)
      PathPoint default_9: Tibia_l (-0.0093018 -0.0053392 0.032061)
      PathPoint default_10: Tibia_l (0.0011085 -0.019678 0.032223)
      PathPoint default_11: Mid_Foot_l (0.07635 0.031177 0.031438)
    Thelen2003Muscle TIBIALIS_POST_MED_3_L: max_isometric_force=266.4 optimal_fiber_length=0.024
        tendon_slack_length=0.11 pennation_angle_at_optimal=0.43982
      PathPoint default: Tibia_l (-0.0028543 0.18786 0.046312)
      PathPoint default_0: Tibia_l (-0.012032 0.061558 0.023613)
      PathPoint default_1: Tibia_l (-0.011832 0.048872 0.023834)
      PathPoint default_2: Tibia_l (-0.012798 0.039252 0.024552)
      PathPoint default_3: Tibia_l (-0.014154 0.030878 0.024726)
      PathPoint default_4: Tibia_l (-0.014889 0.025738 0.024513)
      PathPoint default_5: Tibia_l (-0.016071 0.02022 0.025588)
      PathPoint default_6: Tibia_l (-0.01502 0.014579 0.026622)
      PathPoint default_7: Tibia_l (-0.014358 0.010183 0.027111)
      PathPoint default_8: Tibia_l (-0.013868 0.0022584 0.028833)
      PathPoint default_9: Tibia_l (-0.0093018 -0.0053392 0.032061)
      PathPoint default_10: Tibia_l (0.0011085 -0.019678 0.032223)
      PathPoint default_11: Mid_Foot_l (0.07635 0.031177 0.031438)
    Thelen2003Muscle TIBIALIS_POST_LAT_1_L: max_isometric_force=266.4 optimal_fiber_length=0.024
        tendon_slack_length=0.11 pennation_angle_at_optimal=0.75224
      PathPoint default: Tibia_l (-0.0017269 0.26341 0.033979)
      PathPoint default_0: Tibia_l (-0.011832 0.048872 0.023834)
      PathPoint default_1: Tibia_l (-0.012798 0.039252 0.024552)
      PathPoint default_2: Tibia_l (-0.014154 0.030878 0.024726)
      PathPoint default_3: Tibia_l (-0.014889 0.025738 0.024513)
      PathPoint default_4: Tibia_l (-0.016071 0.02022 0.025588)
      PathPoint default_5: Tibia_l (-0.01502 0.014579 0.026622)
      PathPoint default_6: Tibia_l (-0.014358 0.010183 0.027111)
      PathPoint default_7: Tibia_l (-0.013868 0.0022584 0.028833)
      PathPoint default_8: Tibia_l (-0.0093018 -0.0053392 0.032061)
      PathPoint default_9: Tibia_l (0.0011085 -0.019678 0.032223)
      PathPoint default_10: Mid_Foot_l (0.07635 0.031177 0.031438)
    Thelen2003Muscle TIBIALIS_POST_LAT_2_L: max_isometric_force=266.4 optimal_fiber_length=0.024
        tendon_slack_length=0.11 pennation_angle_at_optimal=0.75224
      PathPoint default: Tibia_l (-0.0045002 0.19097 0.020097)
      PathPoint default_0: Tibia_l (-0.011832 0.048872 0.023834)
      PathPoint default_1: Tibia_l (-0.012798 0.039252 0.024552)
      PathPoint default_2: Tibia_l (-0.014154 0.030878 0.024726)
      PathPoint default_3: Tibia_l (-0.014889 0.025738 0.024513)
      PathPoint default_4: Tibia_l (-0.016071 0.02022 0.025588)
      PathPoint default_5: Tibia_l (-0.01502 0.014579 0.026622)
      PathPoint default_6: Tibia_l (-0.014358 0.010183 0.027111)
      PathPoint default_7: Tibia_l (-0.013868 0.0022584 0.028833)
      PathPoint default_8: Tibia_l (-0.0093018 -0.0053392 0.032061)
      PathPoint default_9: Tibia_l (0.0011085 -0.019678 0.032223)
      PathPoint default_10: Mid_Foot_l (0.07635 0.031177 0.031438)
    Thelen2003Muscle TIBIALIS_POST_LAT_3_L: max_isometric_force=266.4 optimal_fiber_length=0.024
        tendon_slack_length=0.11 pennation_angle_at_optimal=0.75224
      PathPoint default: Tibia_l (-0.0031731 0.12077 0.0056531)
      PathPoint default_0: Tibia_l (-0.011832 0.048872 0.023834)
      PathPoint default_1: Tibia_l (-0.012798 0.039252 0.024552)
      PathPoint default_2: Tibia_l (-0.014154 0.030878 0.024726)
      PathPoint default_3: Tibia_l (-0.014889 0.025738 0.024513)
      PathPoint default_4: Tibia_l (-0.016071 0.02022 0.025588)
      PathPoint default_5: Tibia_l (-0.01502 0.014579 0.026622)
      PathPoint default_6: Tibia_l (-0.014358 0.010183 0.027111)
      PathPoint default_7: Tibia_l (-0.013868 0.0022584 0.028833)
      PathPoint default_8: Tibia_l (-0.0093018 -0.0053392 0.032061)
      PathPoint default_9: Tibia_l (0.0011085 -0.019678 0.032223)
      PathPoint default_10: Mid_Foot_l (0.07635 0.031177 0.031438)
    Thelen2003Muscle VASTUS_INTERM_1_L: max_isometric_force=234.95 optimal_fiber_length=0.077 tendon_slack_length=0.126
        pennation_angle_at_optimal=0.20595
      PathPoint default: Femur_l (0.013749 -0.24159 -0.013955)
      PathPoint default_0: Patella_l (0 0 0)
      PathWrap: wrap_object=Wrap_Quadriceps_Anterior_L
    Thelen2003Muscle VASTUS_INTERM_2_L: max_isometric_force=234.95 optimal_fiber_length=0.077 tendon_slack_length=0.126
        pennation_angle_at_optimal=0.20595
      PathPoint default: Femur_l (0.01043 -0.1857 -0.020867)
      PathPoint default_0: Patella_l (0 0 0)
      PathWrap: wrap_object=Wrap_Quadriceps_Anterior_L
    Thelen2003Muscle VASTUS_INTERM_3_L: max_isometric_force=234.95 optimal_fiber_length=0.077 tendon_slack_length=0.126
        pennation_angle_at_optimal=0.20595
      PathPoint default: Femur_l (0.0063207 -0.12149 -0.031416)
      PathPoint default_0: Patella_l (0 0 0)
      PathWrap: wrap_object=Wrap_Quadriceps_Anterior_L
    Thelen2003Muscle VASTUS_INTERM_4_L: max_isometric_force=234.95 optimal_fiber_length=0.077 tendon_slack_length=0.126
        pennation_angle_at_optimal=0.20595
      PathPoint default: Femur_l (0.01371 -0.24417 -0.027053)
      PathPoint default_0: Patella_l (-0.006 0.0003 -0.01)
      PathWrap: wrap_object=Wrap_Quadriceps_Anterior_L
    Thelen2003Muscle VASTUS_INTERM_5_L: max_isometric_force=234.95 optimal_fiber_length=0.077 tendon_slack_length=0.126
        pennation_angle_at_optimal=0.20595
      PathPoint default: Femur_l (0.010621 -0.18768 -0.03279)
      PathPoint default_0: Patella_l (-0.006 0.0003 -0.01)
      PathWrap: wrap_object=Wrap_Quadriceps_Anterior_L
    Thelen2003Muscle VASTUS_INTERM_6_L: max_isometric_force=234.95 optimal_fiber_length=0.077 tendon_slack_length=0.126
        pennation_angle_at_optimal=0.20595
      PathPoint default: Femur_l (0.0050358 -0.12438 -0.04059)
      PathPoint default_0: Patella_l (-0.006 0.0003 -0.01)
      PathWrap: wrap_object=Wrap_Quadriceps_Anterior_L
    Thelen2003Muscle VASTUS_INTERM_7_L: max_isometric_force=234.95 optimal_fiber_length=0.077 tendon_slack_length=0.126
        pennation_angle_at_optimal=0.20595
      PathPoint default: Femur_l (0.015753 -0.284784 -0.0101081)
      PathPoint default_0: Patella_l (-0.006 0.0003 -0.01)
      PathWrap: wrap_object=Wrap_Quadriceps_Anterior_L
    Thelen2003Muscle VASTUS_INTERM_8_L: max_isometric_force=234.95 optimal_fiber_length=0.077 tendon_slack_length=0.126
        pennation_angle_at_optimal=0.20595
      PathPoint default: Femur_l (0.0160382 -0.290935 -0.021)
      PathPoint default_0: Patella_l (-0.006 0.0003 -0.01)
      PathWrap: wrap_object=Wrap_Quadriceps_Anterior_L
    Thelen2003Muscle VASTUS_LAT_INF_1_L: max_isometric_force=65.9833 optimal_fiber_length=0.042
        tendon_slack_length=0.096 pennation_angle_at_optimal=0
      PathPoint default: Femur_l (-0.0083974 -0.2959 -0.020045)
      PathPoint default_0: Patella_l (-0.006 0.0003 -0.01)
      PathWrap: wrap_object=Wrap_Femur_Shaft_Lateralis_L
    Thelen2003Muscle VASTUS_LAT_INF_2_L: max_isometric_force=65.9833 optimal_fiber_length=0.042
        tendon_slack_length=0.096 pennation_angle_at_optimal=0
      PathPoint default: Femur_l (-0.0093633 -0.25299 -0.023577)
      PathPoint default_0: Patella_l (-0.006 0.0003 -0.01)
      PathWrap: wrap_object=Wrap_Femur_Shaft_Lateralis_L
    Thelen2003Muscle VASTUS_LAT_INF_3_L: max_isometric_force=65.9833 optimal_fiber_length=0.042
        tendon_slack_length=0.096 pennation_angle_at_optimal=0
      PathPoint default: Femur_l (-0.011614 -0.20663 -0.029693)
      PathPoint default_0: Patella_l (-0.006 0.0003 -0.01)
      PathWrap: wrap_object=Wrap_Femur_Shaft_Lateralis_L
    Thelen2003Muscle VASTUS_LAT_INF_4_L: max_isometric_force=65.9833 optimal_fiber_length=0.042
        tendon_slack_length=0.096 pennation_angle_at_optimal=0
      PathPoint default: Femur_l (-0.016624 -0.16076 -0.034427)
      PathPoint default_0: Patella_l (-0.006 0.0003 -0.01)
      PathWrap: wrap_object=Wrap_Femur_Shaft_Lateralis_L
    Thelen2003Muscle VASTUS_LAT_INF_5_L: max_isometric_force=65.9833 optimal_fiber_length=0.042
        tendon_slack_length=0.096 pennation_angle_at_optimal=0
      PathPoint default: Femur_l (-0.018482 -0.11526 -0.045281)
      PathPoint default_0: Patella_l (-0.006 0.0003 -0.01)
      PathWrap: wrap_object=Wrap_Femur_Shaft_Lateralis_L
    Thelen2003Muscle VASTUS_LAT_INF_6_L: max_isometric_force=65.9833 optimal_fiber_length=0.042
        tendon_slack_length=0.096 pennation_angle_at_optimal=0
      PathPoint default: Femur_l (-0.02051 -0.069195 -0.054121)
      PathPoint default_0: Patella_l (-0.006 0.0003 -0.01)
      PathWrap: wrap_object=Wrap_Femur_Shaft_Lateralis_L
    Thelen2003Muscle VASTUS_LAT_SUP_1_L: max_isometric_force=1091.5 optimal_fiber_length=0.091
        tendon_slack_length=0.096 pennation_angle_at_optimal=0
      PathPoint default: Femur_l (-0.0039138 -0.034375 -0.066102)
      PathPoint default_0: Patella_l (-0.006 0.0003 -0.01)
      PathWrap: wrap_object=Wrap_Femur_Shaft_Lateralis_L
    Thelen2003Muscle VASTUS_LAT_SUP_2_L: max_isometric_force=1091.5 optimal_fiber_length=0.091
        tendon_slack_length=0.096 pennation_angle_at_optimal=0
      PathPoint default: Femur_l (0.0088996 -0.019935 -0.048109)
      PathPoint default_0: Patella_l (-0.006 0.0003 -0.01)
      PathWrap: wrap_object=Wrap_Femur_Shaft_Lateralis_L
    Thelen2003Muscle VASTUS_MED_INF_1_L: max_isometric_force=181.3 optimal_fiber_length=0.076 tendon_slack_length=0.096
        pennation_angle_at_optimal=0
      PathPoint default: Femur_l (-0.0062733 -0.305 -0.006657)
      PathPoint default_0: Patella_l (0 0 0)
      PathWrap: wrap_object=Wrap_Femur_Shaft_Medialis_L
    Thelen2003Muscle VASTUS_MED_INF_2_L: max_isometric_force=181.3 optimal_fiber_length=0.076 tendon_slack_length=0.096
        pennation_angle_at_optimal=0
      PathPoint default: Femur_l (-0.0035362 -0.30324 -0.0023395)
      PathPoint default_0: Patella_l (0 0 0)
      PathWrap: wrap_object=Wrap_Femur_Shaft_Medialis_L
    Thelen2003Muscle VASTUS_MED_MID_1_L: max_isometric_force=429.2 optimal_fiber_length=0.076 tendon_slack_length=0.096
        pennation_angle_at_optimal=0
      PathPoint default: Femur_l (-0.0067464 -0.25682 -0.0092937)
      PathPoint default_0: Patella_l (0 0 0)
      PathWrap: wrap_object=Wrap_Femur_Shaft_Medialis_L
    Thelen2003Muscle VASTUS_MED_MID_2_L: max_isometric_force=429.2 optimal_fiber_length=0.076 tendon_slack_length=0.096
        pennation_angle_at_optimal=0
      PathPoint default: Femur_l (0.0017183 -0.25654 -0.0046116)
      PathPoint default_0: Patella_l (0 0 0)
      PathWrap: wrap_object=Wrap_Femur_Shaft_Medialis_L
    Thelen2003Muscle VASTUS_MED_SUP_1_L: max_isometric_force=165.8833 optimal_fiber_length=0.083
        tendon_slack_length=0.096 pennation_angle_at_optimal=0
      PathPoint default: Femur_l (-0.0090909 -0.20391 -0.013439)
      PathPoint default_0: Patella_l (0 0 0)
      PathWrap: wrap_object=Wrap_Femur_Shaft_Medialis_L
    Thelen2003Muscle VASTUS_MED_SUP_2_L: max_isometric_force=165.8833 optimal_fiber_length=0.083
        tendon_slack_length=0.096 pennation_angle_at_optimal=0
      PathPoint default: Femur_l (0.0052533 -0.20494 -0.012041)
      PathPoint default_0: Patella_l (0 0 0)
      PathWrap: wrap_object=Wrap_Femur_Shaft_Medialis_L
    Thelen2003Muscle VASTUS_MED_SUP_3_L: max_isometric_force=165.8833 optimal_fiber_length=0.083
        tendon_slack_length=0.096 pennation_angle_at_optimal=0
      PathPoint default: Femur_l (-0.012828 -0.15266 -0.019469)
      PathPoint default_0: Patella_l (0 0 0)
      PathWrap: wrap_object=Wrap_Femur_Shaft_Medialis_L
    Thelen2003Muscle VASTUS_MED_SUP_4_L: max_isometric_force=165.8833 optimal_fiber_length=0.083
        tendon_slack_length=0.096 pennation_angle_at_optimal=0
      PathPoint default: Femur_l (0.0044441 -0.15156 -0.02105)
      PathPoint default_0: Patella_l (0 0 0)
      PathWrap: wrap_object=Wrap_Femur_Shaft_Medialis_L
    Thelen2003Muscle VASTUS_MED_SUP_5_L: max_isometric_force=165.8833 optimal_fiber_length=0.083
        tendon_slack_length=0.096 pennation_angle_at_optimal=0
      PathPoint default: Femur_l (0.00099892 -0.082876 -0.029794)
      PathPoint default_0: Patella_l (0 0 0)
      PathWrap: wrap_object=Wrap_Femur_Shaft_Medialis_L
    Thelen2003Muscle VASTUS_MED_SUP_6_L: max_isometric_force=165.8833 optimal_fiber_length=0.083
        tendon_slack_length=0.096 pennation_angle_at_optimal=0
      PathPoint default: Femur_l (0.00099892 -0.082876 -0.029794)
      PathPoint default_0: Patella_l (0 0 0)
      PathWrap: wrap_object=Wrap_Femur_Shaft_Medialis_L
    ObjectGroup Adductors: members=(ADD_BREV_PROS_1_L ADD_BREV_PROS_2_L ADD_BREV_MID_1_L ADD_BREV_MID_2_L ADD_BREV_DIST_1_L ADD_BREV_DIST_2_L ADD_LONG_1_L ADD_LONG_2_L ADD_LONG_3_L ADD_LONG_4_L ADD_LONG_5_L ADD_LONG_6_L ADD_MAG_DIST_1_L ADD_MAG_DIST_2_L ADD_MAG_DIST_3_L ADD_MAG_MID_1_L ADD_MAG_MID_2_L ADD_MAG_MID_3_L ADD_MAG_MID_4_L ADD_MAG_MID_5_L ADD_MAG_MID_6_L ADD_MAG_PROX_1_L ADD_MAG_PROX_2_L ADD_MAG_PROX_3_L ADD_MAG_PROX_4_L)
    ObjectGroup hip_exrot: members=(GEM_INF_1_L GEM_SUP_1_L PIRIFORME_1_L QUAD_FEM_1_L QUAD_FEM_2_L QUAD_FEM_3_L QUAD_FEM_4_L)
    ObjectGroup Gluteus: members=(GLUT_MAX_SUP_1_L GLUT_MAX_SUP_2_L GLUT_MAX_SUP_3_L GLUT_MAX_SUP_4_L GLUT_MAX_SUP_5_L GLUT_MAX_SUP_6_L GLUT_MAX_INF_1_L GLUT_MAX_INF_2_L GLUT_MAX_INF_3_L GLUT_MAX_INF_4_L GLUT_MAX_INF_5_L GLUT_MAX_INF_6_L GLUT_MED_ANT_1_L GLUT_MED_ANT_2_L GLUT_MED_ANT_3_L GLUT_MED_ANT_4_L GLUT_MED_ANT_5_L GLUT_MED_ANT_6_L GLUT_MED_POST_1_L GLUT_MED_POST_2_L GLUT_MED_POST_3_L GLUT_MED_POST_4_L GLUT_MED_POST_5_L GLUT_MED_POST_6_L GLUT_MIN_ANT_1_L GLUT_MIN_MID_1_L GLUT_MIN_POST_1_L)
    ObjectGroup Quadricep (knee extensors): members=(RECTUS_FEM_1_L RECTUS_FEM_2_L VASTUS_INTERM_1_L VASTUS_INTERM_2_L VASTUS_INTERM_3_L VASTUS_INTERM_4_L VASTUS_INTERM_5_L VASTUS_INTERM_6_L VASTUS_LAT_INF_1_L VASTUS_LAT_INF_2_L VASTUS_LAT_INF_3_L VASTUS_LAT_INF_4_L VASTUS_LAT_INF_5_L VASTUS_LAT_INF_6_L VASTUS_LAT_SUP_1_L VASTUS_LAT_SUP_2_L VASTUS_MED_INF_1_L VASTUS_MED_INF_2_L VASTUS_MED_MID_1_L VASTUS_MED_MID_2_L VASTUS_MED_SUP_1_L VASTUS_MED_SUP_2_L VASTUS_MED_SUP_3_L VASTUS_MED_SUP_4_L VASTUS_MED_SUP_5_L VASTUS_MED_SUP_6_L)
    ObjectGroup knee_flex: members=(BIC_FEM_CL_1_L BIC_FEM_CB_1_L BIC_FEM_CB_2_L BIC_FEM_CB_3_L GASTR_LAT_1_L GASTR_MED_1_L GRACILIS_1_L GRACILIS_2_L SARTORIUS_PROS_1_L SARTORIUS_DIST_1_L SEMIMEMB_1_L SEMITEND_1_L)
    ObjectGroup ankle crossing: members=(EXT_DIG_LONG_1_L EXT_DIG_LONG_2_L EXT_DIG_LONG_3_L EXT_HAL_LONG_1_L EXT_HAL_LONG_2_L EXT_HAL_LONG_3_L FLEX_DIG_LONG_1_L FLEX_DIG_LONG_2_L FLEX_DIG_LONG_3_L FLEX_HAL_LONG_1_L FLEX_HAL_LONG_2_L FLEX_HAL_LONG_3_L GASTR_LAT_1_L GASTR_MED_1_L PERONEUS_BREV_1_L PERONEUS_BREV_2_L PERONEUS_BREV_3_L PERONEUS_LONG_1_L PERONEUS_LONG_2_L PERONEUS_LONG_3_L PERONEUS_TERT_1_L PERONEUS_TERT_2_L PERONEUS_TERT_3_L PLANTARIS_1_L SOLEUS_MED_1_L SOLEUS_MED_2_L SOLEUS_MED_3_L SOLEUS_LAT_1_L SOLEUS_LAT_2_L SOLEUS_LAT_3_L TIBIALIS_ANT_1_L TIBIALIS_ANT_2_L TIBIALIS_ANT_3_L TIBIALIS_POST_MED_1_L TIBIALIS_POST_MED_2_L TIBIALIS_POST_MED_3_L TIBIALIS_POST_LAT_1_L TIBIALIS_POST_LAT_2_L TIBIALIS_POST_LAT_3_L)
